# 600W 12V PSU Design
# Primary Digital, Secondary Analog Control
# Andrew
# Topology: Single-phase boost PFC + Half-bridge LLC, center-tapped secondary (diode SR)
# General-purpose Functions
# Check pass/fail
check(a, b) :=
    if a ≥ b
        "PASS"
    else
        "FAIL"
# Wire diameter
D_wire(AWG) := (10*2.54/π*10^(-AWG/20)) mm
# Wire + insulation diameter
D_wire_insul(AWG) := (10*2.54/π*10^(-AWG/20) + 0.028*sqrt(10*2.54/π*10^(-AWG/20))*sqrt(10)) mm
# Wire cross section area
A_wire(AWG) := π*D_wire(AWG)^2/4
# Wire + insultation cross section area
A_wire_insul(AWG) := π*D_wire_insul(AWG)^2/4
# Litz wire diameter
D_Litz(AWG, strand) := sqrt(4*A_wire_insul(AWG)*strand/π)
# Copper resistivity
ρ_Cu(temp) := 1.724*(1 + 0.0042*(temp - 20))*10^-5 mm*Ω
# Copper dc current density
J_Cu_dc := 4.5 A/mm^2
# Wire resistance
R_wire(temp, AWG) := ρ_Cu(temp)/A_wire(AWG)
# Wire maximum current
I_wire(AWG) := J_Cu_dc*A_wire(AWG)
# Operating Conditions
# Input
# Minimum input voltage
V_ac_min := 90 V
# Maximum input voltage
V_ac_max := 275 V
# Nominal input voltage
V_ac_nom := 230 V
# Minimum input frequency
f_ac_min := 47 Hz
# Maximum input frequency
f_ac_max := 63 Hz
# Bulk
# Nominal bulk voltage
V_bulk_nom := 400 V
# Bulk voltage ripple
V_bulk_ripple := 10 V
# Minimum bulk voltage
V_bulk_min := V_bulk_nom - V_bulk_ripple = 390 V
# Maximum bulk voltage
V_bulk_max := V_bulk_nom + V_bulk_ripple = 410 V
# Check if bulk voltage above maximum ac high line
check(V_bulk_min, V_ac_max*sqrt(2)) = "PASS"
# Bulk voltage during holdup
V_bulk_holdup := 295 V
# PFC target efficiency
η_PFC := 97%
# PFC switching frequency
f_sw := 65 kHz
# PSU
# Hold-up time
t_holdup := 22 ms
# Output
# DC-DC target efficiency
η_LLC := 98%
# Nominal output power
P_out_nom := 600 W
# Nominal bulk power
P_bulk_nom := P_out_nom/η_LLC = 612.245 W
# Nominal output voltage
V_out_nom := 12 V
# Output voltage adjustment
V_out_adj := 20%
# Minimum output voltage
V_out_min := V_out_nom*(100% - V_out_adj) = 9.6 V
# Maximum output voltage
V_out_max := V_out_nom*(100% + V_out_adj) = 14.4 V
# Output voltage peak-to-peak ripple
ΔV_pp_max := V_out_nom*1% = 0.12 V
# Nominal output power
P_out_nom := 600 W
# Nominal output current
I_out_nom := P_out_nom/V_out_nom = 50 A
# DC-DC efficiency target
η_LLC := 98%
# LLC Topology
# Number of parallel secondary
N_parallel := 1
# Primary; full-bridge = 4, half-bridge = 2
topo_pri := 2
# Secondary; full-bridge = 4, half-bridge = 2
topo_sec := 2
# Thermals
# Minimum ambient temperature
T_amb_min := 0 °C
# Maximum ambient temperature
T_amb_max := 55 °C
# Nominal air velocity
v_air := 2 m/s
# Boost Inductor/PFC Coil Design
# Peak inductor current
I_coil_pk_LL_max(load) := sqrt(2)*P_bulk_nom*load/(η_PFC*V_ac_min)
I_coil_pk_LL_max(1) = 9.91804 A
I_coil_pk_HL_max(load) := sqrt(2)*P_bulk_nom*load/(η_PFC*V_ac_nom)
I_coil_pk_HL_max(1) = 3.88097 A
# RMS inductor current
I_coil_LL_rms(load) := P_bulk_nom*load/(η_PFC*V_ac_min)
I_coil_LL_rms(1) = 7.01311 A
I_coil_HL_rms(load) := P_bulk_nom*load/(η_PFC*V_ac_nom)
I_coil_HL_rms(1) = 2.74426 A
# Ratio of allowable peak-to-peak ripple current to peak current in inductor (ripple current ratio)
I_ratio := 20%  # Choose between 25%-45%
# Peak inductor current including ripple
I_coil_pk_LL_max(load) := I_coil_pk_LL_max(load)*(100% + I_ratio)
I_coil_pk_LL_max(1) = 11.9017 A
I_coil_pk_HL_max(load) := I_coil_pk_HL_max(load)*(100% + I_ratio)
I_coil_pk_HL_max(1) = 4.65717 A
# Inductance
L_PFC := V_ac_min^2/(2*I_ratio*f_sw*P_bulk_nom*η_PFC) = 524.584 μH
L_PFC := 590 μH
# Actual current ratio
I_ratio := V_ac_min^2/(2*f_sw*P_bulk_nom*η_PFC*L_PFC) = 0.177825
# Actual peak inductor current including ripple
I_coil_pk_LL_max(load) := sqrt(2)*P_bulk_nom*load/(η_PFC*V_ac_min)
I_coil_pk_LL_max(load) := I_coil_pk_LL_max(load)*(100% + I_ratio)
I_coil_pk_LL_max(1) = 11.6817 A
I_coil_pk_HL_max(load) := sqrt(2)*P_bulk_nom*load/(η_PFC*V_ac_nom)
I_coil_pk_HL_max(load) := I_coil_pk_HL_max(load)*(100% + I_ratio)
I_coil_pk_HL_max(1) = 4.57111 A
# Select core size
# Effective magnetic path length
l_e_PFC := 48.9 mm = 48.9 mm
# PQ3220 KF9
# Same as LLC choke
# Effective core-sectional area
A_e_PFC := 153 mm^2
# Minimum area
A_min_PFC := 139.6 mm^2
# Effective volume
V_e_PFC := 7481.7 mm^3 = 7.4817 cm^3
# Window area
A_w_PFC := 114.86 mm^2 = 114.86 mm^2
# Dimensions
A := 32 mm
D1 := 27.5 mm
F := 11.5 mm
B := 20.55 mm
D2 := 19 mm
C := 22 mm
E := 13.45 mm
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# Bobbin thickness
B_thk := 1.1 mm
# Bobbin winding height
H_b_PFC := F - 2*B_thk = 9.3 mm
# Bobbin winding width
W_b_PFC := ((D1 - E)/2) - B_thk = 5.925 mm
# Mean length turn
MLT_PFC := ((D1 + E)/2)*π = 64.3241 mm
# AL value
A_L_PFC := 7.2 μH
# Maximum flux density of KF9
B_m_KF9 := 0.275 T
# Maximum flux density
B_max_PFC := 1.35 T
# Winding area
A_w_PFC := 2*H_b_PFC*W_b_PFC = 110.205 mm^2
# Area product
AP := A_e_PFC*A_w_PFC = 1.68614 cm^4
# Area product
μ_r_PFC := 60
# Required volume
V_e_req := μ_r_PFC*μ_0*L_PFC*(I_coil_pk_LL_max(1)/B_max_PFC)^2 = 3.33088 cm^3
check(V_e_PFC, V_e_req) = "PASS"
# PFC choke winding
# Number of turns required
N_PFC := sqrt(L_PFC*l_e_PFC/(μ_r_PFC*μ_0*A_e_PFC)) = 50.0097
# Choose number of turns
N_PFC := 40
# Center leg airgap
l_gap_PFC := N_PFC^2*A_e_PFC*μ_0/L_PFC = 0.521398 mm
# Wire size
AWG_PFC := 38
# Wire diameter
D_wire(AWG_PFC) = 0.101785 mm
# Number of strands
strand_PFC := 90
# Litz wire diameter
D_Litz_PFC := D_Litz(AWG_PFC, strand_PFC) = 1.23361 mm
D_Litz_PFC := D_Litz_PFC = 1.23361 mm
# PFC inductance
L_PFC = 590 μH
# Max primary turns per layer
N_turns_PFC := H_b_PFC/D_Litz_PFC = 7.53886
# 7 turns x 5 layers
# 5 turns x 1 layer
# Cross section area
A_PFC := A_wire(AWG_PFC)*strand_PFC = 0.732319 mm^2
# Operating current density
J_PFC_LL := I_coil_LL_rms(1)/A_PFC = 9.57659 A/mm^2
J_PFC_HL := I_coil_HL_rms(1)/A_PFC = 3.74736 A/mm^2
# Wire length
l_PFC := N_PFC*MLT_PFC = 2.57296 m
# Wire DC resistance
R_PFC := ρ_Cu(25)*l_PFC/A_PFC = 0.0618439 Ω
# Primary copper loss
P_PFC_Cu_LL(load) := I_coil_LL_rms(load)^2*R_PFC
P_PFC_Cu_LL(1) = 3.04172 W
P_PFC_Cu_HL(load) := I_coil_HL_rms(load)^2*R_PFC
P_PFC_Cu_HL(1) = 0.465745 W
# Window utilization factor
K_u_PFC := (A_PFC*N_PFC)/A_w_PFC = 0.265802
# PFC choke core
# Operating magnetic flux density
ΔB_pp_LL := V_ac_min*(1 - V_ac_min/V_bulk_nom)/(N_PFC*A_e_PFC*f_sw) = 0.175339 T
ΔB_pp_HL := V_ac_nom*(1 - V_ac_nom/V_bulk_nom)/(N_PFC*A_e_PFC*f_sw) = 0.245726 T
# Core loss density
P_v_KF9_LL(load) := 0.0167*(f_sw/Hz)^1.84*(ΔB_pp_LL/T)^2.923 W/m^3
P_v_PFC_LL(load) := P_v_KF9_LL(load)
P_v_KF9_HL(load) := 0.0167*(f_sw/Hz)^1.84*(ΔB_pp_HL/T)^2.923 W/m^3
P_v_PFC_HL(load) := P_v_KF9_HL(load)
# Core loss
P_PFC_core_LL(load) := P_v_PFC_LL(load)*V_e_PFC
P_PFC_core_LL(1) = 0.552506 W
P_PFC_core_HL(load) := P_v_PFC_HL(load)*V_e_PFC
P_PFC_core_HL(1) = 1.48173 W
# PFC choke loss
# Total loss
P_PFC_choke_LL(load) := P_PFC_Cu_LL(load) + P_PFC_core_LL(load)
P_PFC_choke_LL(1) = 3.59422 W
P_PFC_choke_HL(load) := P_PFC_Cu_HL(load) + P_PFC_core_HL(load)
P_PFC_choke_HL(1) = 1.94747 W
# Diode Bridge
# Diode bridge forward voltage
V_f_bridge := 0.86 V
# GBU15JL
# Lite-On PN: 8A0997
# Bridge power loss
P_bridge_LL(load) := 4*sqrt(2)/π*V_f_bridge/V_ac_min*P_bulk_nom/η_PFC*load
P_bridge_LL(1) = 10.8601 W
P_bridge_HL(load) := 4*sqrt(2)/π*V_f_bridge/V_ac_nom*P_bulk_nom/η_PFC*load
P_bridge_HL(1) = 4.24961 W
# Boost Diode
# Boost diode forward voltage
V_f_diode := 2 V
# C3D06060F
# Lite-On PN: 813519
# Boost diode power loss
P_diode(load) := V_f_diode*P_bulk_nom*load/V_bulk_nom
P_diode(1) = 3.06122 W
# Boost MOSFET
# Boost MOSFET rms current
I_M_LL_rms(load) := P_bulk_nom*load/(η_PFC*V_ac_min)*sqrt(1 - 8*sqrt(2)*V_ac_min/(3*π*V_bulk_nom))
I_M_LL_rms(1) = 5.99162 A
I_M_HL_rms(load) := P_bulk_nom*load/(η_PFC*V_ac_nom)*sqrt(1 - 8*sqrt(2)*V_ac_nom/(3*π*V_bulk_nom))
I_M_HL_rms(1) = 1.52734 A
# Number of PFC MOSFET
n_PFC := 2
# IPP60R180P7
# Lite-On PN: 8A01VV
# PFC MOSFET Rdson
R_ds_on_PFC := 0.34 Ω
# PFC MOSFET input capacitance
C_iss_PFC := 1081 pF
# PFC MOSFET output capacitance
C_oss_PFC := 19 pF
# PFC MOSFET reverse capacitance
C_rss_PFC := 5 pF
# PFC MOSFET stored energy
E_oss_PFC := 2.8*10^-6 J
# PFC MOSFET gate charge
Q_g_PFC := 25 nC
# PFC MOSFET gate voltage
V_g_PFC := 10 V
# PFC MOSFET threshold voltage
V_th_PFC := 5.2 V
# PFC MOSFET plateau voltage
V_pl_PFC := 5.2 V
# PFC MOSFET gate resistance
R_g_PFC := 11 Ω
# PFC MOSFET turn-on voltage
V_on_PFC := V_bulk_nom = 400 V
# PFC MOSFET conduction loss
P_con_LL_PFC(load) := I_M_LL_rms(load)^2*R_ds_on_PFC/n_PFC
P_con_LL_PFC(1) = 6.10291 W
P_con_HL_PFC(load) := I_M_HL_rms(load)^2*R_ds_on_PFC/n_PFC
P_con_HL_PFC(1) = 0.396572 W
# Turn-on time
t_on_PFC := n_PFC*C_iss_PFC*R_g_PFC*ln((V_g_PFC - V_th_PFC)/(V_g_PFC - V_pl_PFC)) + n_PFC*C_rss_PFC*R_g_PFC*((V_bulk_nom - V_pl_PFC)/(V_g_PFC - V_pl_PFC))
t_on_PFC = 9.0475 ns
# Turn-on power loss
P_on_LL_PFC(load) := 0.5*I_coil_LL_rms(load)*V_bulk_nom*t_on_PFC*f_sw
P_on_LL_PFC(1) = 0.824865 W
P_on_HL_PFC(load) := 0.5*I_coil_HL_rms(load)*V_bulk_nom*t_on_PFC*f_sw
P_on_HL_PFC(1) = 0.322773 W
# Turn-off time
t_off_PFC := n_PFC*C_iss_PFC*R_g_PFC*ln(V_pl_PFC/V_th_PFC) + n_PFC*C_rss_PFC*R_g_PFC*((V_bulk_nom - V_pl_PFC)/V_pl_PFC)
t_off_PFC = 8.35154 ns
# Turn-off power loss
P_off_LL_PFC(load) := 0.5*I_coil_LL_rms(load)*V_bulk_nom*t_off_PFC*f_sw
P_off_LL_PFC(1) = 0.761414 W
P_off_HL_PFC(load) := 0.5*I_coil_HL_rms(load)*V_bulk_nom*t_off_PFC*f_sw
P_off_HL_PFC(1) = 0.297945 W
# Output capacitance switching loss
P_PFC_eoss := n_PFC*E_oss_PFC*f_sw = 0.364 W
# Gate driver loss
P_PFC_driver := n_PFC*V_g_PFC*Q_g_PFC*f_sw = 0.0325 W
# PFC MOSFET loss
P_PFC_MOSFET_LL(load) := P_con_LL_PFC(load) + P_on_LL_PFC(load) + P_off_LL_PFC(load) + P_PFC_eoss + P_PFC_driver
P_PFC_MOSFET_LL(1) = 8.08569 W
P_PFC_MOSFET_HL(load) := P_con_HL_PFC(load) + P_on_HL_PFC(load) + P_off_HL_PFC(load) + P_PFC_eoss + P_PFC_driver
P_PFC_MOSFET_HL(1) = 1.41379 W
# Relay
# Relay contact resistance
R_relay := 0.01 Ω
# Relay current
I_relay_LL_rms(load) := P_bulk_nom*load/(η_PFC*V_ac_min)*sqrt(8*sqrt(2)*V_ac_min/(3*π*V_bulk_nom))
I_relay_LL_rms(1) = 3.64476 A
I_relay_HL_rms(load) := P_bulk_nom*load/(η_PFC*V_ac_nom)*sqrt(8*sqrt(2)*V_ac_nom/(3*π*V_bulk_nom))
I_relay_HL_rms(1) = 2.27996 A
# Relay loss
P_relay_LL(load) := I_relay_LL_rms(load)^2*R_relay
P_relay_LL(1) = 0.132843 W
P_relay_HL(load) := I_relay_HL_rms(load)^2*R_relay
P_relay_HL(1) = 0.051982 W
# EMI Choke
# EMI Choke 1 - Common Mode
# Outer diameter
OD_emi1 := 17 mm
# T17.5*12.6*6
# 2*20 turns
# 8.1mH each winding
# Lite-On PN: 819891
# Inner diameter
ID_emi1 := 12.4 mm
# Height
HT_emi1 := 6.5 mm
# Effective magnetic path length
l_e_emi1 := 4.61 cm
# Effective core-sectional area
A_e_emi1 := 0.12 cm^2
# Effective volume
V_e_emi1 := 0.55 cm^2
# Number of turns
N_emi1 := 20
# Wire gauge
AWG_emi1 := 19
# Wire diameter
D_emi1 := D_wire(AWG_emi1) = 0.90716 mm
# Wire area
A_emi1 := A_wire(AWG_emi1) = 0.646335 mm^2
# Number of wire strands
strand_emi1 := 1
# Current density of wire
J_emi1_LL := I_coil_LL_rms(1)/A_emi1 = 10.8506 A/mm^2
J_emi1_HL := I_coil_HL_rms(1)/A_emi1 = 4.24588 A/mm^2
# Total wire length
l_emi1 := 2*(N_emi1*((OD_emi1 - ID_emi1) + HT_emi1*2))*1.1 = 0.7744 m
# Total wire resistance
R_emi1 := ρ_Cu(25)*l_emi1/A_emi1 = 0.0210897 Ω
# EMI 2 power loss
P_emi1_LL(load) := I_coil_LL_rms(load)^2*R_emi1
P_emi1_LL(1) = 1.03727 W
P_emi1_HL(load) := I_coil_HL_rms(load)^2*R_emi1
P_emi1_HL(1) = 0.158826 W
# EMI Choke 2 - Differential Mode
# Outer diameter
OD_emi2 := 17.3 mm
# T17.27*9.65*6.35
# 36 turns
# 55.72uH
# Lite-On PN: 793591
# Inner diameter
ID_emi2 := 9.7 mm
# Height
HT_emi2 := 6.4 mm
# AL value
AL_emi2 := 0.043 μH
# Relative permeability
μ_r_emi2 := 60
# Number of turns
N_emi2 := 36
# Wire gauge
AWG_emi2 := 18
# Wire diameter
D_emi2 := D_wire(AWG_emi2) = 1.01785 mm
# Wire area
A_emi2 := A_wire(AWG_emi2) = 0.813687 mm^2
# Number of wire strands
strand_emi2 := 1
# Current density of wire
J_emi2_LL := I_coil_LL_rms(1)/A_emi2 = 8.61893 A/mm^2
J_emi2_HL := I_coil_HL_rms(1)/A_emi2 = 3.37262 A/mm^2
# Total wire length
l_emi2 := N_emi2*((OD_emi2 - ID_emi2) + HT_emi2*2)*1.1 = 0.80784 m
# Total wire resistance
R_emi2 := ρ_Cu(25)*l_emi2/A_emi2 = 0.0174755 Ω
# EMI 2 power loss
P_emi2_LL(load) := I_coil_LL_rms(load)^2*R_emi2
P_emi2_LL(1) = 0.859513 W
P_emi2_HL(load) := I_coil_HL_rms(load)^2*R_emi2
P_emi2_HL(1) = 0.131608 W
# If use same common mode
P_emi2_LL(load) := P_emi1_LL(load)
P_emi2_LL(1) = 1.03727 W
P_emi2_HL(load) := P_emi1_HL(load)
P_emi2_HL(1) = 0.158826 W
# PFC Loss
# Total PFC loss
P_PFC_LL_total(load) := P_bridge_LL(load) + P_diode(load) + P_PFC_MOSFET_LL(load) + P_relay_LL(load) + P_emi1_LL(load) + P_emi2_LL(load)
P_PFC_HL_total(load) := P_bridge_HL(load) + P_diode(load) + P_PFC_MOSFET_HL(load) + P_relay_LL(load) + P_emi2_HL(load) + P_emi2_HL(load)
# PFC efficiency
eff_PFC_LL(load) := load*P_bulk_nom/W/(load*P_bulk_nom/W + P_PFC_LL_total(load)/W)
eff_PFC_HL(load) := load*P_bulk_nom/W/(load*P_bulk_nom/W + P_PFC_HL_total(load)/W)
# Loss components
P_PFC_loss_components_LL(load) := [
    load;
    P_relay_LL(load);
    P_bridge_LL(load);
    P_diode(load);
    P_PFC_MOSFET_LL(load);
    P_PFC_choke_LL(load);
    P_emi1_LL(load);
    P_emi2_LL(load);
    P_PFC_LL_total(load);
    eff_PFC_LL(load)
]
P_PFC_loss_components_HL(load) := [
    load;
    P_relay_HL(load);
    P_bridge_HL(load);
    P_diode(load);
    P_PFC_MOSFET_HL(load);
    P_PFC_choke_HL(load);
    P_emi1_HL(load);
    P_emi2_HL(load);
    P_PFC_HL_total(load);
    eff_PFC_HL(load)
]
# Loss components' captions
P_PFC_loss_caption := ["Load"; "Relay"; "Bridge diode"; "Boost diode"; "PFC MOSFET"; "PFC choke"; "EMI choke 1"; "EMI choke 2"; "Total PFC losses"; "PFC efficiency"]
# Table of PFC losses
P_PFC_loss_table_LL[:, 0] := P_PFC_loss_caption
P_PFC_loss_table_LL[:, 1] := P_PFC_loss_components_LL(0.1)
P_PFC_loss_table_LL[:, 2] := P_PFC_loss_components_LL(0.2)
P_PFC_loss_table_LL[:, 3] := P_PFC_loss_components_LL(0.5)
P_PFC_loss_table_LL[:, 4] := P_PFC_loss_components_LL(1.0)
P_PFC_loss_table_HL[:, 0] := P_PFC_loss_caption
P_PFC_loss_table_HL[:, 1] := P_PFC_loss_components_HL(0.1)
P_PFC_loss_table_HL[:, 2] := P_PFC_loss_components_HL(0.2)
P_PFC_loss_table_HL[:, 3] := P_PFC_loss_components_HL(0.5)
P_PFC_loss_table_HL[:, 4] := P_PFC_loss_components_HL(1.0)
P_PFC_loss_table_LL = [
    "Load", 0.1, 0.2, 0.5, 1;
    "Relay", 0.00132843 W, 0.00531371 W, 0.0332107 W, 0.132843 W;
    "Bridge diode", 1.08601 W, 2.17202 W, 5.43006 W, 10.8601 W;
    "Boost diode", 0.306122 W, 0.612245 W, 1.53061 W, 3.06122 W;
    "PFC MOSFET", 0.616157 W, 0.957872 W, 2.71537 W, 8.08569 W;
    "PFC choke", 0.582923 W, 0.674175 W, 1.31293 W, 3.59422 W;
    "EMI choke 1", 0.0103727 W, 0.0414909 W, 0.259318 W, 1.03727 W;
    "EMI choke 2", 0.0103727 W, 0.0414909 W, 0.259318 W, 1.03727 W;
    "Total PFC losses", 2.03037 W, 3.83044 W, 10.2279 W, 24.2144 W;
    "PFC efficiency", 0.967902, 0.969667, 0.967669, 0.961954
]
P_PFC_loss_table_HL = [
    "Load", 0.1, 0.2, 0.5, 1;
    "Relay", 0.00051982 W, 0.00207928 W, 0.0129955 W, 0.051982 W;
    "Bridge diode", 0.424961 W, 0.849922 W, 2.12481 W, 4.24961 W;
    "Boost diode", 0.306122 W, 0.612245 W, 1.53061 W, 3.06122 W;
    "PFC MOSFET", 0.462537 W, 0.536506 W, 0.806002 W, 1.41379 W;
    "PFC choke", 1.48639 W, 1.50036 W, 1.59816 W, 1.94747 W;
    "EMI choke 1", 0.00158826 W, 0.00635305 W, 0.0397065 W, 0.158826 W;
    "EMI choke 2", 0.00158826 W, 0.00635305 W, 0.0397065 W, 0.158826 W;
    "Total PFC losses", 1.19813 W, 2.01669 W, 4.57404 W, 9.17512 W;
    "PFC efficiency", 0.980806, 0.983797, 0.985278, 0.985235
]
# [plot: eff_PFC_LL(load) vs load]
# [plot: eff_PFC_HL(load) vs load]
# Minimum load to find peak efficiency
load_min := 0.01
# Maximum load to find peak efficiency
load_max := 1
# Starting load to find peak efficiency
load_guess := 0.5
solve block
    # guess values
    eff(load) := load*P_bulk_nom/W/(load*P_bulk_nom/W + P_PFC_HL_total(load)/W)
    # constraints
    load_min ≤ load_guess ≤ load_max
    # solver
    load_eff_max := maximize(eff, load_guess) = 0.684168
end solve block
# Peak efficiency
eff_max := eff_PFC_HL(load_eff_max) = 0.985369
check(eff_max, η_PFC) = "PASS"
# LLC Transformer Turns Ratio and Gain
V_bulk_min := 290*V
V_bulk_nom := 300*V
V_bulk_max := 310*V
V_bulk_holdup = 295 V
# Required transformer turns ratio
n_tr_req := η_LLC*(V_bulk_nom/(0.25*topo_pri))/V_out_nom = 49
# Number of primary turns
n_pri := 13
# Number of secondary turns
n_sec := 1
# Transformer turns ratio
n_tr := n_pri/n_sec = 13
# Inductance ratio, Lm/Lr
L_n := 8.5
# Actual turns after compensation of
# leakage inductance
n_tr_eff := n_tr*sqrt(1 + 1/L_n) = 13.7434
# Transformer gain
K_tr := 1/n_tr_eff = 0.0727619
# Primary bridge gain
K_pri := 0.25*topo_pri = 0.5
# LLC Gain
# Nominal gain
M_nom := V_out_nom/V_bulk_nom*1/(K_tr*K_pri) = 1.09948
# Minimum gain during maximum Vbulk
M_min := V_out_min/V_bulk_max*1/(K_tr*K_pri) = 0.851207
# Maximum gain during minimum Vbulk
M_max := V_out_max/V_bulk_min*1/(K_tr*K_pri) = 1.36487
# Gain during end of holdup
M_holdup := V_out_nom/V_bulk_holdup*1/(K_tr*K_pri) = 1.11811
# ZVS Constraints
# (based on STM AN2450)
# Deadtime
T_D := 400 ns
M_max = 1.36487
# Maximum Q which allows maximum voltage gain at boundary between inductive and capacitive mode
Q_max := 1/(M_max*L_n)*sqrt(L_n + M_max^2/(M_max^2 - 1)) = 0.281415
# Constraint where input impedance has zero phase, with margin of 5%
Q_zvs_1 := 1/95%*Q_max = 0.296227
# Minimum operating frequency which allows the required maximum voltage gain at the boundary between capacitive and inductive mode.
f_n_min := sqrt(1/(1 + L_n*(1 - 1/M_max))) = 0.552808
# Maximum operating frequency
f_n_max := sqrt(1/(1 + L_n*(1 - 1/M_min))) = 1.43471i
# Equivalent load resistance on primary
R_ac := 8/π^2*n_tr^2*V_out_nom^2/P_out_nom = 32.8767 Ω
# Output capacitance of primary mosfet
C_oss := 111*pF
# Total capacitance at bridge midpoint
# (excluding stray capacitance)
C_zvs := 2*C_oss = 222 pF
# Constraint on Q for ZVS at no-load and maximum input voltage
Q_zvs_2 := 2/π*f_n_max/(L_n*(1/(L_n + 1))*f_n_max^2 - 1/L_n)*T_D/(R_ac*C_zvs) = -25.5475i
# Qmax has to be smaller than both Qzvs_1 and Q_zvs_2 for ZVS operation.
# Check if ZVS is fulfilled
check(Q_zvs_1, Q_max) = "PASS"
check(Q_zvs_2, Q_max) =  # error: These values cannot be compared.
# Resonant Tank Parameters
# Resonant inductance
L_r := 28 μH
# Resonant capacitance
C_r := 2*68 nF = 136 nF
# Magnetizing inductance
L_m := L_n*L_r = 238 μH
# Resonant frequency
f_r := 1/(2*π*sqrt(L_r*C_r)) = 81.559 kHz
# FHA-based gain curve
# Equivalent resistance
R_eq(P_load) := n_tr^2*8/π^2*V_out_nom^2/P_load
# Quality factor
Q(P_load) := 1/R_eq(P_load)*sqrt(L_r/C_r)
# LLC gain
G_ac(f_s, P_load) := 1/sqrt((1 + 1/L_n*(1 - f_r^2/f_s^2))^2 + (f_s/f_r - f_r/f_s)^2*Q(P_load)^2)
# [plot: G_ac(f_s*Hz, 600 W), G_ac(f_s*Hz, 300 W), G_ac(f_s*Hz, 120 W), G_ac(f_s*Hz, 60 W) vs f_s]
# Check LLC operating range
# LLC gain
G_o(f_s, P_load) := G_ac(f_s, P_load)
# Zoomed-in gain curve for operating region
# [plot: G_ac(f_s*Hz, 600 W), G_ac(f_s*Hz, 300 W), G_ac(f_s*Hz, 120 W), G_ac(f_s*Hz, 60 W) vs f_s]
# Find maximum gain
# Redefine gain for 100% load condition
G_600W(f_s) := G_o(f_s, 600 W)
# Redefine gain for 50% load condition
G_300W(f_s) := G_o(f_s, 300 W)
# Redefine gain for 10% load condition
G_60W(f_s) := G_o(f_s, 60 W)
# Guess frequency
f_guess := 30 kHz
# Operating frequency at 100% load
f_max_600W := maximize(G_600W, f_guess) = 45.1392 kHz
# Maximum gain for 100% load
G_max_600W := G_o(f_max_600W, 600 W) = 1.09281
# Check if gain is sufficient
check(G_max_600W, M_holdup) = "FAIL"
# Find typical operating frequency range
solve block
    # guess values
    f_min_guess := 50 kHz
    # constraints
    G_600W(f_min_guess) == M_max
    # solver
    f_min := find(f_min_guess)  # error: No solution was found. Try changing the guess value or the value of TOL or CTOL.
end solve block
# Minimum frequency
# @ 100% load
solve block
    # guess values
    f_max_guess := 50 kHz
    # constraints
    G_60W(f_max_guess) == M_min
    # solver
    f_max := find(f_max_guess) = 695.276 kHz
end solve block
# Maximum frequency
# @ 10% load
solve block
    # guess values
    f_nom_guess := 50 kHz
    # constraints
    G_300W(f_nom_guess) == M_nom
    # solver
    f_nom := find(f_nom_guess) = 59.8396 kHz
end solve block
# Nominal frequency
# @ 50% load
# Strip units for graphing
f_min := f_min/Hz
f_max := f_max/Hz = 695276
f_nom := f_nom/Hz = 59839.6
# [plot: G_o(f_s*Hz, 600 W), G_o(f_s*Hz, 300 W), G_o(f_s*Hz, 120 W), G_o(f_s*Hz, 60 W) vs f_s]
# Holdup Calculations
# Minimum holdup voltage
# (from above)
V_bulk_holdup = 295 V
# Holdup time
t_holdup := 20 ms
# Minimum ac frequency
f_ac_min := 47 Hz
# Calculation 1 - For holdup
V_bulk_holdup := 190*V
C_bulk_1 := 2*P_out_nom*t_holdup/(V_bulk_min^2 - V_bulk_holdup^2) = 500 μF
V_bulk_min = 290 V
# Calculation 2 - For ripple requirements
C_bulk_2 := P_out_nom/(2*π*f_ac_min*(2*V_bulk_ripple)*V_bulk_nom) = 338.628 μF
# Required bulk capacitance
# Rubycon MXG 470uF
# 450V 30*50
# Lite-On PN: 738343
C_bulk := max(C_bulk_1, C_bulk_2) = 500 μF
# Voltage/Current Equations
# Output current
I_out(load) := I_out_nom*load
# SR rms current
I_sr_rms(load) := π/4*I_out(load)
# SR average current
I_sr_avg(load) := 0.636*I_sr_rms(load)
# Gold Finger
# Connector contact resistance
R_connector := 0.0004 Ω
# Number of contacts
n_connector := 1
# Voltage drop of connector
V_d_connector(load) := 2*I_out(load)*R_connector/n_connector
# Connector power loss
P_connector(load) := I_out(1)*V_d_connector(load)
P_connector(1) = 2 W
# ORing
# ORing MOSFET Rdson
R_ds_on_oring := 0.00095 Ω
# OptiMOS 5
# BSC009NE2LS5I
# 25V
# Rds_on = 0.95mΩ
# Number in parallel
n_oring := 2
# Voltage drop of ORing
# MOSFET
V_d_oring(load) := I_out(load)*R_ds_on_oring/n_oring
# ORing MOSFET power loss
P_oring(load) := I_out(load)*V_d_oring(load)
P_oring(1) = 1.1875 W
# Output Rsense
# Output sense resistance
R_sense := 0.0005 Ω
# Number in parallel
n_sense := 3
# Voltage drop of sense resistor
V_d_sense(load) := I_out(load)*R_sense/n_sense
# Sense resistor power loss
P_sense(load) := I_out(load)^2*R_sense/n_sense
P_sense(1) = 0.416667 W
# SR MOSFET
# Secondary topology
topo_sec = 2
# Number of secondary stages
n_sec_stage := 1
# Number of parallel SR
n_sr_parallel := 3
# SR rms current at 100% load
I_sr_rms(1) = 39.2699 A
# Number of SR (each switch)
n_sr := n_sec_stage*n_sr_parallel = 3
# SR Rdson
R_ds_on_sr := 0.0014 Ω
# OptiMOS 5
# BSC014N04LS
# 40V
# Rds_on = 1.4mΩ
# SR gate voltage
V_g_sr := 10 V
# SR gate charge
Q_g_sr := 61 nC
# Voltage drop of SR
V_d_sr(load) := I_sr_rms(load)*R_ds_on_sr/n_sr
V_d_sr(1) = 18.326 mV
# Conduction loss of SR
P_sr_con(load) := I_sr_rms(load)^2*R_ds_on_sr/n_sr
P_sr_con(1) = 0.719659 W
# Switching loss of SR
P_sr_sw(load) := 0.1*P_sr_con(load)
P_sr_sw(1) = 0.0719659 W
# Gate driver loss of SR
P_sr_drv := V_g_sr*Q_g_sr*(f_nom*Hz) = 0.0365021 W
# SR power loss
P_sr(load) := topo_sec*(P_sr_con(load) + P_sr_sw(load) + P_sr_drv)
P_sr(1) = 1.65625 W
# Primary MOSFET
# Primary topology
topo_pri = 2
# Number of primary stages
n_pri_stage := 1
# Number of parallel MOSFET
n_pri_parallel := 1
# Number of primary MOSFET
# (each switch)
n_pri := n_pri_stage*n_pri_parallel = 1
# Total voltage drop up to primary MOSFET
V_d_total(load) := V_d_connector(load) + V_d_oring(load) + V_d_sense(load) + V_d_sr(load)
V_d_total(1) = 90.4093 mV
# Total bridge PWM voltage
V_out_pwm(load) := V_out_nom + V_d_total(load)
V_out_pwm(1) = 12.0904 V
# Output current
I_out(1) = 50 A
# Secondary rms current
I_sec_rms(load) := π/(2*sqrt(2))*I_out(load)
I_sec_rms(1) = 55.536 A
# Secondary peak current
I_sec_pk(load) := π/2*I_out(load)
I_sec_pk(1) = 78.5398 A
# Magnetizing peak current
I_m(load) := n_tr*V_out_pwm(load)/(4*L_m*(f_nom*Hz))
I_m(1) = 2.75905 A
# Magnetizing rms current
I_m_rms(load) := I_m(load)/sqrt(3)
I_m_rms(1) = 1.59294 A
# Primary rms current
I_pri_rms(load) := sqrt((I_sec_rms(load)/n_tr)^2 + I_m_rms(load)^2)
I_pri_rms(1) = 4.55933 A
# Primary peak current
I_pri_pk(load) := I_sec_pk(load)/n_tr + I_m(load)
I_pri_pk(1) = 8.80057 A
# Primary switch rms current
I_sw_rms(load) := I_pri_rms(load)*sqrt(0.5)
I_sw_rms(1) = 3.22393 A
# Primary MOSFET Rdson
R_ds_on_pri := 0.34 Ω
# IPP60R180P7
# Lite-On PN: 8A01VV
R_ds_on_pri := 0.115 Ω
# IPP60R060P7
# Lite-On PN: 8A00X0
# Primary gate voltage
V_g_pri := 10 V
V_g_pri := 10 V
# Primary gate charge
Q_g_pri := 25 nC
Q_g_pri := 67 nC
# Primary gate-drain charge
Q_gd_pri := 8 nC
Q_gd_pri := 16 nC
# Primary gate-source charge
Q_gs_pri := 6 nC
Q_gs_pri := 20 nC
# Primary MOSFET fall time
t_f_pri := 8 ns
t_f_pri := 4 ns
# Primary MOSFET rise time
t_r_pri := 12 ns
t_r_pri := 12 ns
# Primary MOSFET turn-off time
t_sw_pri_off := t_f_pri
# Total primary charge
Q_sw_pri := Q_gd_pri + Q_gs_pri/2 = 26 nC
# Conduction loss of primary
P_con_pri(load) := I_sw_rms(load)^2*R_ds_on_pri/n_pri_parallel
P_con_pri(1) = 1.19528 W
# Turn-off loss of primary
P_off_pri(load) := 1/2*V_bulk_nom*I_sw_rms(load)*(f_nom*Hz)*t_sw_pri_off*n_pri_parallel
P_off_pri(1) = 0.115751 W
# Gate driver loss of primary
P_drv_pri := V_g_pri*Q_g_pri*(f_nom*Hz)*n_pri_parallel = 0.0400925 W
# Primary MOSFET power loss
P_pri(load) := topo_pri*(P_con_pri(load) + P_off_pri(load) + P_drv_pri)
P_pri(1) = 2.70224 W
# Output Capacitor
# Output current ac component
I_ripple_ac(load) := 0.448*I_out(load)
I_ripple_ac(1) = 22.4 A
# Output rms current
I_out_rms(load) := I_out(load)*π/(2*sqrt(2))
I_out_rms(1) = 55.536 A
# Output current ripple
ΔI_out(load) := I_out(load)*π/2
ΔI_out(1) = 78.5398 A
# Output capacitor current ripple
I_co_rms(load) := sqrt(I_out_rms(load)^2 - I_out(load)^2)
I_co_rms(1) = 24.1713 A
# Output capacitor current ripple
I_co_rms(load) := sqrt((π^2 - 8)/8)*I_out(load)
I_co_rms(1) = 24.1713 A
# Number of electrolytic capacitors
n_co_ecap := 5
# Number of ceramic capacitors
n_co_ceramic := 6
# Electrolytic capacitor value
C_o_ecap := 2200 μF  # Lite-On PN: 818242
# Electrolytic capacitor ESR
ESR_ecap := 0.037 Ω
# Electrolytic capacitor ESL
ESL_ecap := (0.037*0.09) μH
# Electrolytic capacitor ripple current rating
I_co_ecap := 1.99 A
# Ceramic capacitor value
C_o_ceramic := 2.2 μF  # Lite-On PN: 8A0AKK
# Ceramic capacitor ESR
ESR_ceramic := 0.02 Ω
# Ceramic capacitor ESL
ESL_ceramic := 0.0004 μH
# Ceramic capacitor ripple current rating
I_co_ceramic := 2 A
# Total output capacitance
Co_total := C_o_ecap*n_co_ecap + C_o_ceramic*n_co_ceramic = 11013.2 μF
# Total output capacitor ripple current rating
I_co_rms_rated := (I_co_ecap*n_co_ecap + I_co_ceramic*n_co_ceramic) = 21.95 A
# Check if rating sufficient
# Derating <70% desired
I_rating := I_co_rms(1)/I_co_rms_rated = 1.1012
check(70%, I_rating) = "FAIL"
# Electrolytic capacitor impedance
Z_co_ecap := sqrt(((ESR_ecap/Ω)^2 + (2*π*f_nom*ESL_ecap/H)^2))/n_co_ecap*Ω = 0.00740424 Ω
# Ceramic capacitor impedance
Z_co_ceramic := sqrt(((ESR_ceramic/Ω)^2 + (2*π*f_nom*ESL_ceramic/H)^2))/n_co_ceramic*Ω = 0.00333343 Ω
# Total capacitor impedance
Z_co_total := 1/(1/Z_co_ecap + 1/Z_co_ceramic) = 0.00229859 Ω
# Equivalent ESR of output capacitors
ESR_eqv := Z_co_total = 0.00229859 Ω
# Output peak-to-peak voltage ripple
V_ripple_pp(load) := ΔI_out(load)*Z_co_total
V_ripple_pp(1) = 180.531 mV
# Rated output voltage ripple
V_ripple_max := V_out_nom*0.01 = 0.12 V
check(V_ripple_max, V_ripple_pp(1)) = "FAIL"
P_co(load) := I_co_rms(load)^2*ESR_eqv
# Output capacitor power loss
P_co(1) = 1.34295 W
# Output Choke Losses
# 2.6uH
# Lite-On PN: 826455
# Output choke resistance
R_choke := 0.00214 Ω
# Number of chokes in parallel
n_choke := 1
# Output choke power loss
P_choke(load) := I_out(load)^2*R_choke/n_choke + 0.3 W
# 0.3W loss for 10C temp rise
P_choke(1) = 5.65 W
# LLC Main Transformer
# Transformer total power
P_tr_nom := P_bulk_nom + P_out_nom = 1.21224 kW
# Magnetizing inductance
L_m = 238 μH
# Current factor
K_f := 4
# Winding packing factor
K_u := 0.2
# Maximum flux density
B_m := 0.2 T
# Current density
J_c := 12*A/mm^2
# Resonant frequency
f_r = 81.559 kHz
# Minimum frequency
f_min := f_min*Hz
# Required area product
AP_req := P_tr_nom/(K_f*K_u*B_m*J_c*f_min)
# Select core size
# Effective magnetic path length
l_e := 58.8 mm
# Effective core-sectional area
A_e := 150.84 mm^2
# Minimum area
A_min := 139.6 mm^2
# PQ3225 KF9
# Lite-On PN: 8A08P9
# Effective volume
V_e := 8868.02 mm^3
# Window area
A_w := 114.86 mm^2
# Dimensions
A := 32 mm
D1 := 27.5 mm
F := 16.4 mm
B := 25.45 mm
D2 := 19 mm
C := 22 mm
E := 13.45 mm
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# Bobbin thickness
B_thk := 1.1 mm
# Bobbin winding height
H_b := F - 2*B_thk = 14.2 mm
# Bobbin winding width
W_b := ((D1 - E)/2) - B_thk = 5.925 mm
# Mean length turn
MLT := ((D1 + E)/2)*π = 64.3241 mm
# AL value
A_L := 7.2 μH
# Maximum flux density of KF9
B_m_KF9 := 0.275 T
# Winding area
A_w := 2*H_b*W_b = 168.27 mm^2
# Area product
AP := A_e*A_w = 2.53818 cm^4
AP_req =  # error: This variable is undefined. Check that the label is set correctly.
check(AP, AP_req) =  # error
# Transformer primary
# Effective core-sectional area
A_e_tr := A_e = 150.84 mm^2
# Effective volume
V_e_tr := V_e = 8868.02 mm^3
# Maximum flux density
B_max := B_m = 0.2 T
# Turns ratio
n_tr = 13
# Primary turns
N_p_min := n_tr*V_out_pwm(1)/(4*f_min*B_max*A_e_tr)
N_pri := 16
# Secondary turns
N_sec := N_pri/n_tr = 1.23077
# Required center airgap
l_gap_tr := N_pri^2*A_e*μ_0/L_m = 0.203887 mm
# Skin depth
d_skin := 6.62 cm/sqrt(f_sw/Hz) = 0.259658 mm
l_skin := 2*d_skin = 0.519316 mm
# LLC current values
I_out(1) = 50 A
I_pri_pk(1) = 8.80057 A
I_sec_pk(1) = 78.5398 A
I_pri_rms(1) = 4.55933 A
I_sec_rms(1) = 55.536 A
I_sw_rms(1) = 3.22393 A
I_sr_rms(1) = 39.2699 A
# Primary winding
# Wire size
AWG_pri := 38
# Wire diameter
D_wire(AWG_pri) = 0.101785 mm
# Number of strands
strand_pri := 80
# Litz wire diameter
D_Litz_pri := D_Litz(AWG_pri, strand_pri) = 1.16306 mm
D_Litz_pri := D_Litz_pri*1.2 = 1.39567 mm
# Primary turns
N_pri = 16
# Max primary turns per layer
N_turns_pri := H_b/D_Litz_pri = 10.1743  # 8 turns x 2 layers
# Cross section area
A_pri := A_wire(AWG_pri)*strand_pri = 0.65095 mm^2
# Operating current density
J_pri := I_pri_rms(1)/A_pri = 7.00411 A/mm^2
# Mean length turn
MLT_pri := MLT = 64.3241 mm
# Wire length
l_pri := N_pri*MLT_pri = 1.02919 m
# Wire DC resistance
R_pri := ρ_Cu(25)*l_pri/A_pri = 0.0278297 Ω
# Primary copper loss
P_tr_pri(load) := I_pri_rms(load)^2*R_pri
P_tr_pri(1) = 0.578509 W
# Secondary winding
# Wire size
AWG_sec := 38
# Wire diameter
D_wire(AWG_sec) = 0.101785 mm
# Number of strands
strand_sec := 2*150
# Litz wire diameter
D_Litz_sec := D_Litz(AWG_sec, strand_sec) = 2.25225 mm
# Primary turns
N_sec = 1.23077
# Max primary turns per layer
N_turns_sec := H_b/D_Litz_sec = 6.3048  # 4 turns x 1 layer
# Cross section area
A_sec := A_wire(AWG_sec)*strand_sec = 2.44106 mm^2
# Operating current density
J_sec := I_sec_rms(1)/A_sec = 22.7508 A/mm^2
# Mean length turn
MLT_sec := MLT = 64.3241 mm
# Wire length
l_sec := N_sec*MLT_sec = 0.0791681 m
# Wire DC resistance
R_sec := ρ_Cu(25)*l_sec/A_sec = 0.000570867 Ω
# Primary copper loss
P_tr_sec(load) := I_sec_rms(load)^2*R_sec
P_tr_sec(1) = 1.7607 W
# All windings
# Window utilization factor
K_u_tr := 2*(A_pri*N_pri + A_sec*N_sec)/A_w = 0.159501
# Transformer copper loss
P_tr_Cu(load) := P_tr_pri(load) + P_tr_sec(load)
P_tr_Cu(1) = 2.33921 W
# Core loss
# Operating magnetic flux density
B_max_oper(load) := n_tr*V_out_pwm(load)/(4*f_sw*N_pri*A_e_tr)
B_max_oper(1) = 0.250481 T
P_v_KF9(load) := 0.0167*(f_sw/Hz)^1.84*(B_max_oper(load)/T)^2.923 W/m^3
# Core loss density
P_v_tr(load) := P_v_KF9(load)
# Core loss
P_tr_core(load) := P_v_tr(load)*V_e_tr
P_tr_core(1) = 1.85747 W
# Transformer loss
P_tr(load) := P_tr_Cu(load) + P_tr_core(load)
P_tr(1) = 4.19667 W
# Resonant Choke
# Voltage on choke
V_Lr_max := Q_max*V_bulk_max = 87.2388 V
# Resonant rms current
I_Lr_rms(load) := I_pri_rms(load)
I_Lr_rms(1) = 4.55933 A
# Resonant peak current
I_Lr_peak(load) := sqrt(2)*I_Lr_rms(load)
I_Lr_peak(1) = 6.44786 A
# Resonant OCP current
I_Lr_ocp_peak := I_Lr_peak(1)*1.3 = 8.38222 A
# Resonant choke total power
P_Lr_nom := P_bulk_nom = 0.612245 kW
# Resonant inductance
L_r = 28 μH
# Current factor
K_f := 4
# Winding packing factor
K_u := 0.2
# Maximum flux density
B_m := 0.2 T
# Current density
J_c = 0.384 A/mm^2*m/A
# Resonant frequency
f_r = 81.559 kHz
# Minimum frequency
f_min := f_min
# Required area product
AP_req := P_Lr_nom/(K_f*K_u*B_m*J_c*f_min)
# Select core size
# Using integrated with transformer - only half core
# Effective magnetic path length
l_e_Lr := 48.9 mm/2 = 24.45 mm  # PQ3220 KF9
# Effective core-sectional area
A_e_Lr := 153 mm^2
# Minimum area
A_min_Lr := 139.6 mm^2
# Effective volume
V_e_Lr := 7481.7 mm^3/2 = 3740.85 mm^3
# Window area
A_w_Lr := 114.86 mm^2/2 = 57.43 mm^2
# Dimensions
A := 32 mm
D1 := 27.5 mm
F := 11.5 mm/2
B := 20.55 mm/2
D2 := 19 mm
C := 22 mm
E := 13.45 mm
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# Bobbin thickness
B_thk := 1.1 mm
# Bobbin winding height
H_b_Lr := F - 2*B_thk = 3.55 mm
# Bobbin winding width
W_b_Lr := ((D1 - E)/2) - B_thk = 5.925 mm
# Mean length turn
MLT := ((D1 + E)/2)*π = 64.3241 mm
# AL value
A_L := 7.2 μH
# Maximum flux density of KF9
B_m_KF9 := 0.275 T
# Winding area
A_w_Lr := 2*H_b_Lr*W_b_Lr = 42.0675 mm^2
# Area product
AP := A_e*A_w_Lr = 0.634546 cm^4
AP_req =  # error
check(AP, AP_req) =  # error
# Resonant choke winding
# Wire size
AWG_Lr := AWG_pri = 38
# Wire diameter
D_wire(AWG_Lr) = 0.101785 mm
# Number of strands
strand_Lr := strand_pri = 80
# Litz wire diameter
D_Litz_Lr := D_Litz(AWG_Lr, strand_Lr) = 1.16306 mm
D_Litz_Lr := D_Litz_Lr*1.2 = 1.39567 mm
# Resonant inductance
L_r = 28 μH
# Set Bmax
B_max_Lr := 0.1 T
# Number of turns (1)
N_Lr_1 := V_Lr_max/(A_e*B_max_Lr*4.44*f_r) = 15.9712
# Number of turns (2)
N_Lr_2 := L_r*I_Lr_peak(1)/(B_max_Lr*A_e) = 11.969
# Choose number of turns
N_Lr := 10
# Center leg airgap
l_gap_Lr := N_Lr^2*A_e*μ_0/L_r = 0.676968 mm
# Max primary turns per layer
N_turns_Lr := H_b/D_Litz_Lr = 10.1743  # 2 turns x 5 layers
# Cross section area
A_Lr := A_pri = 0.65095 mm^2
# Operating current density
J_Lr := J_pri = 7.00411 A/mm^2
# Mean length turn
MLT_Lr := MLT = 64.3241 mm
# Wire length
l_Lr := N_Lr*MLT_Lr = 0.643241 m
# Wire DC resistance
R_Lr := ρ_Cu(25)*l_Lr/A_Lr = 0.0173936 Ω
# Primary copper loss
P_Lr_Cu(load) := I_Lr_rms(load)^2*R_Lr
P_Lr_Cu(1) = 0.361568 W
# Window utilization factor
K_u_Lr := (A_Lr*N_Lr)/A_w_Lr = 0.154739
# Resonant choke core loss
# Operating magnetic flux density
B_max_oper_Lr(load) := L_r*I_pri_rms(load)/(N_Lr*A_e)
B_max_oper_Lr(1) = 0.0846335 T
P_v_KF9(load) := 0.0167*(f_sw/Hz)^1.84*(B_max_oper_Lr(load)/T)^2.923 W/m^3
# Core loss density
P_v_Lr(load) := P_v_KF9(load)
# Core loss
P_Lr_core(load) := P_v_Lr(load)*V_e_Lr
P_Lr_core(1) = 0.0328589 W
# Resonant choke loss
# Total loss
P_Lr(load) := P_Lr_Cu(load) + P_Lr_core(load)
P_Lr(1) = 0.394427 W
# LLC Losses
# Loss components | Loss components' captions
P_loss_elements(load) := [
    P_pri(load);
    P_sr(load);
    P_co(load);
    P_connector(load);
    P_sense(load);
    P_oring(load);
    P_tr(load);
    P_Lr(load)
]
P_losses_caption := ["Primary MOSFET"; "SR MOSFET"; "Output cap"; "Connector"; "Sense resistor"; "ORing"; "Transformer"; "Choke"]
# LLC total loss
P_LLC_loss_total(load) := sum(P_loss_elements(load))
# LLC efficiency
eff_LLC(load) := load*P_out_nom/W/(load*P_out_nom/W + P_LLC_loss_total(load)/W)
# Redeclare loss components | Redeclare loss components' captions
P_loss_elements(load) := [
    load;
    P_pri(load);
    P_sr(load);
    P_co(load);
    P_choke(load);
    P_connector(load);
    P_sense(load);
    P_oring(load);
    P_tr(load);
    P_Lr(load);
    P_LLC_loss_total(load);
    eff_LLC(load)
]
P_losses_caption := ["Load"; "Primary MOSFET"; "SR MOSFET"; "Output cap"; "Output choke"; "Connector"; "Sense resistor"; "ORing"; "Transformer"; "Choke"; "Total"; "Efficiency"]
# Table of LLC losses
P_loss_table[:, 0] := P_losses_caption
P_loss_table[:, 1] := P_loss_elements(0.1)
P_loss_table[:, 2] := P_loss_elements(0.2)
P_loss_table[:, 3] := P_loss_elements(0.5)
P_loss_table[:, 4] := P_loss_elements(1.0)
P_loss_table = [
    "Load", 0.1, 0.2, 0.5, 1;
    "Primary MOSFET", 0.472279 W, 0.543817 W, 1.02962 W, 2.70224 W;
    "SR MOSFET", 0.0888368 W, 0.136334 W, 0.468817 W, 1.65625 W;
    "Output cap", 0.0134295 W, 0.0537182 W, 0.335739 W, 1.34295 W;
    "Output choke", 0.3535 W, 0.514 W, 1.6375 W, 5.65 W;
    "Connector", 0.2 W, 0.4 W, 1 W, 2 W;
    "Sense resistor", 0.00416667 W, 0.0166667 W, 0.104167 W, 0.416667 W;
    "ORing", 0.011875 W, 0.0475 W, 0.296875 W, 1.1875 W;
    "Transformer", 1.91352 W, 1.98569 W, 2.47448 W, 4.19667 W;
    "Choke", 0.0483688 W, 0.0584753 W, 0.129973 W, 0.394427 W;
    "Total", 2.75248 W, 3.2422 W, 5.83966 W, 13.8967 W;
    "Efficiency", 0.956138, 0.973692, 0.980906, 0.977363
]
# [plot: eff_LLC(load) vs load]
# Minimum load to find peak efficiency
load_min := 0.01
# Maximum load to find peak efficiency
load_max := 1
# Starting load to find peak efficiency
load_guess := 0.5
solve block
    # guess values
    eff(load) := load*P_out_nom/W/(load*P_out_nom/W + P_LLC_loss_total(load)/W)
    # constraints
    load_min ≤ load_guess ≤ load_max
    # solver
    load_eff_max := maximize(eff, load_guess) = 0.511547
end solve block
# Peak efficiency
eff_max := eff_LLC(load_eff_max) = 0.98091
check(eff_max, 0.975) = "PASS"
# Aux and Fan Losses (estimate only)
# Auxiliary Supply
# Standby voltages
V_aux1 := 5 V
# ER4242
# Lite-On PN: 824067
V_aux2 := 12 V
V_aux3 := 12 V
# Standby current
I_aux1 := 2 A
I_aux2 := 0.3 A
I_aux3 := 0.3 A
# Estimated efficiency
eff_aux := 0.9
# Estimated losses
P_aux(load) := 0.5 W + (V_aux1*I_aux1 + V_aux2*I_aux2 + V_aux3*I_aux3)*load*(1 - eff_aux)
P_aux(1) = 2.22 W
# Fan Power
# Fan power
P_fan_rated := 3 W
# Fan losses
P_fan(load) := P_fan_rated*load
P_fan(1) = 3 W
# 600W PSU Overall Losses
# Total losses
P_PSU_LL_total(load) := P_PFC_LL_total(load) + P_LLC_loss_total(load) + P_aux(load) + P_fan(load)
P_PSU_HL_total(load) := P_PFC_HL_total(load) + P_LLC_loss_total(load) + P_aux(load) + P_fan(load)
# LLC efficiency
eff_PSU_LL_total(load) := load*P_out_nom/W/(load*P_out_nom/W + P_PSU_LL_total(load)/W)
eff_PSU_HL_total(load) := load*P_out_nom/W/(load*P_out_nom/W + P_PSU_HL_total(load)/W)
# Low-line loss components | High-line loss components
P_loss_comp_LL_total(load) := [
    load*W;
    P_relay_LL(load);
    P_bridge_LL(load);
    P_diode(load);
    P_PFC_MOSFET_LL(load);
    P_PFC_choke_LL(load);
    P_emi1_LL(load);
    P_emi2_LL(load);
    P_pri(load);
    P_sr(load);
    P_co(load);
    P_choke(load);
    P_connector(load);
    P_sense(load);
    P_oring(load);
    P_tr(load);
    P_Lr(load);
    P_aux(load);
    P_fan(load);
    P_PSU_LL_total(load);
    eff_PSU_LL_total(load)*W
]
P_loss_comp_HL_total(load) := [
    load*W;
    P_relay_HL(load);
    P_bridge_HL(load);
    P_diode(load);
    P_PFC_MOSFET_HL(load);
    P_PFC_choke_HL(load);
    P_emi1_HL(load);
    P_emi2_HL(load);
    P_pri(load);
    P_sr(load);
    P_co(load);
    P_choke(load);
    P_connector(load);
    P_sense(load);
    P_oring(load);
    P_tr(load);
    P_Lr(load);
    P_aux(load);
    P_fan(load);
    P_PSU_HL_total(load);
    eff_PSU_HL_total(load)*W
]
P_loss_comp_LL_total(load) := P_loss_comp_LL_total(load)/W
P_loss_comp_HL_total(load) := P_loss_comp_HL_total(load)/W
# Captions
P_losses_total_caption := ["Load"; "Relay"; "Bridge diode"; "Boost diode"; "PFC MOSFET"; "PFC choke"; "EMI choke 1"; "EMI choke 2"; "Primary MOSFET"; "SR MOSFET"; "Output cap"; "Output choke"; "Connector"; "Sense resistor"; "ORing"; "Transformer"; "Resonant Choke"; "Aux"; "Fan"; "Total losses"; "Efficiency"]
# Table of total losses at low-line
P_loss_table_LL_total[:, 0] := P_losses_total_caption
P_loss_table_LL_total[:, 1] := P_loss_comp_LL_total(0.1)
P_loss_table_LL_total[:, 2] := P_loss_comp_LL_total(0.2)
P_loss_table_LL_total[:, 3] := P_loss_comp_LL_total(0.3)
P_loss_table_LL_total[:, 4] := P_loss_comp_LL_total(0.4)
P_loss_table_LL_total[:, 5] := P_loss_comp_LL_total(0.5)
P_loss_table_LL_total[:, 6] := P_loss_comp_LL_total(0.6)
P_loss_table_LL_total[:, 7] := P_loss_comp_LL_total(0.7)
P_loss_table_LL_total[:, 8] := P_loss_comp_LL_total(0.8)
P_loss_table_LL_total[:, 9] := P_loss_comp_LL_total(0.9)
P_loss_table_LL_total[:, 10] := P_loss_comp_LL_total(1)
# Table of total losses at high-line
P_loss_table_HL_total[:, 0] := P_losses_total_caption
P_loss_table_HL_total[:, 1] := P_loss_comp_HL_total(0.1)
P_loss_table_HL_total[:, 2] := P_loss_comp_HL_total(0.2)
P_loss_table_HL_total[:, 3] := P_loss_comp_HL_total(0.3)
P_loss_table_HL_total[:, 4] := P_loss_comp_HL_total(0.4)
P_loss_table_HL_total[:, 5] := P_loss_comp_HL_total(0.5)
P_loss_table_HL_total[:, 6] := P_loss_comp_HL_total(0.6)
P_loss_table_HL_total[:, 7] := P_loss_comp_HL_total(0.7)
P_loss_table_HL_total[:, 8] := P_loss_comp_HL_total(0.8)
P_loss_table_HL_total[:, 9] := P_loss_comp_HL_total(0.9)
P_loss_table_HL_total[:, 10] := P_loss_comp_HL_total(1)
# Total losses at low-line
P_loss_table_LL_total = [
    "Load", 0.1, 0.2, 0.3, 0.4, 0.5, 0.6, 0.7, 0.8, 0.9, 1;
    "Relay", 0.00132843, 0.00531371, 0.0119559, 0.0212549, 0.0332107, 0.0478234, 0.065093, 0.0850194, 0.107603, 0.132843;
    "Bridge diode", 1.08601, 2.17202, 3.25804, 4.34405, 5.43006, 6.51607, 7.60208, 8.68809, 9.77411, 10.8601;
    "Boost diode", 0.306122, 0.612245, 0.918367, 1.22449, 1.53061, 1.83673, 2.14286, 2.44898, 2.7551, 3.06122;
    "PFC MOSFET", 0.616157, 0.957872, 1.42165, 2.00748, 2.71537, 3.54532, 4.49732, 5.57139, 6.76751, 8.08569;
    "PFC choke", 0.582923, 0.674175, 0.82626, 1.03918, 1.31293, 1.64752, 2.04295, 2.4992, 3.0163, 3.59422;
    "EMI choke 1", 0.0103727, 0.0414909, 0.0933545, 0.165964, 0.259318, 0.373418, 0.508263, 0.663854, 0.84019, 1.03727;
    "EMI choke 2", 0.0103727, 0.0414909, 0.0933545, 0.165964, 0.259318, 0.373418, 0.508263, 0.663854, 0.84019, 1.03727;
    "Primary MOSFET", 0.472279, 0.543817, 0.661313, 0.823549, 1.02962, 1.2789, 1.57102, 1.90572, 2.28283, 2.70224;
    "SR MOSFET", 0.0888368, 0.136334, 0.215497, 0.326324, 0.468817, 0.642974, 0.848796, 1.08628, 1.35544, 1.65625;
    "Output cap", 0.0134295, 0.0537182, 0.120866, 0.214873, 0.335739, 0.483464, 0.658048, 0.859491, 1.08779, 1.34295;
    "Output choke", 0.3535, 0.514, 0.7815, 1.156, 1.6375, 2.226, 2.9215, 3.724, 4.6335, 5.65;
    "Connector", 0.2, 0.4, 0.6, 0.8, 1, 1.2, 1.4, 1.6, 1.8, 2;
    "Sense resistor", 0.00416667, 0.0166667, 0.0375, 0.0666667, 0.104167, 0.15, 0.204167, 0.266667, 0.3375, 0.416667;
    "ORing", 0.011875, 0.0475, 0.106875, 0.19, 0.296875, 0.4275, 0.581875, 0.76, 0.961875, 1.1875;
    "Transformer", 1.91352, 1.98569, 2.10324, 2.26617, 2.47448, 2.72816, 3.02722, 3.37166, 3.76148, 4.19667;
    "Resonant Choke", 0.0483688, 0.0584753, 0.0753658, 0.0991548, 0.129973, 0.16796, 0.213257, 0.266006, 0.326349, 0.394427;
    "Aux", 0.672, 0.844, 1.016, 1.188, 1.36, 1.532, 1.704, 1.876, 2.048, 2.22;
    "Fan", 0.3, 0.6, 0.9, 1.2, 1.5, 1.8, 2.1, 2.4, 2.7, 3;
    "Total losses", 5.75484, 8.51664, 11.6334, 15.1039, 18.9275, 23.1037, 27.6323, 32.513, 37.746, 43.3311;
    "Efficiency", 0.91248, 0.933731, 0.939294, 0.940793, 0.940653, 0.939693, 0.93827, 0.936562, 0.934667, 0.932646
]
# [plot: eff_PSU_LL_total(load) vs load]
# Total losses at high-line
P_loss_table_HL_total = [
    "Load", 0.1, 0.2, 0.3, 0.4, 0.5, 0.6, 0.7, 0.8, 0.9, 1;
    "Relay", 0.00051982, 0.00207928, 0.00467838, 0.00831712, 0.0129955, 0.0187135, 0.0254712, 0.0332685, 0.0421054, 0.051982;
    "Bridge diode", 0.424961, 0.849922, 1.27488, 1.69984, 2.12481, 2.54977, 2.97473, 3.39969, 3.82465, 4.24961;
    "Boost diode", 0.306122, 0.612245, 0.918367, 1.22449, 1.53061, 1.83673, 2.14286, 2.44898, 2.7551, 3.06122;
    "PFC MOSFET", 0.462537, 0.536506, 0.618407, 0.708239, 0.806002, 0.911697, 1.02532, 1.14688, 1.27637, 1.41379;
    "PFC choke", 1.48639, 1.50036, 1.52365, 1.55625, 1.59816, 1.6494, 1.70994, 1.7798, 1.85898, 1.94747;
    "EMI choke 1", 0.00158826, 0.00635305, 0.0142944, 0.0254122, 0.0397065, 0.0571774, 0.0778248, 0.101649, 0.128649, 0.158826;
    "EMI choke 2", 0.00158826, 0.00635305, 0.0142944, 0.0254122, 0.0397065, 0.0571774, 0.0778248, 0.101649, 0.128649, 0.158826;
    "Primary MOSFET", 0.472279, 0.543817, 0.661313, 0.823549, 1.02962, 1.2789, 1.57102, 1.90572, 2.28283, 2.70224;
    "SR MOSFET", 0.0888368, 0.136334, 0.215497, 0.326324, 0.468817, 0.642974, 0.848796, 1.08628, 1.35544, 1.65625;
    "Output cap", 0.0134295, 0.0537182, 0.120866, 0.214873, 0.335739, 0.483464, 0.658048, 0.859491, 1.08779, 1.34295;
    "Output choke", 0.3535, 0.514, 0.7815, 1.156, 1.6375, 2.226, 2.9215, 3.724, 4.6335, 5.65;
    "Connector", 0.2, 0.4, 0.6, 0.8, 1, 1.2, 1.4, 1.6, 1.8, 2;
    "Sense resistor", 0.00416667, 0.0166667, 0.0375, 0.0666667, 0.104167, 0.15, 0.204167, 0.266667, 0.3375, 0.416667;
    "ORing", 0.011875, 0.0475, 0.106875, 0.19, 0.296875, 0.4275, 0.581875, 0.76, 0.961875, 1.1875;
    "Transformer", 1.91352, 1.98569, 2.10324, 2.26617, 2.47448, 2.72816, 3.02722, 3.37166, 3.76148, 4.19667;
    "Resonant Choke", 0.0483688, 0.0584753, 0.0753658, 0.0991548, 0.129973, 0.16796, 0.213257, 0.266006, 0.326349, 0.394427;
    "Aux", 0.672, 0.844, 1.016, 1.188, 1.36, 1.532, 1.704, 1.876, 2.048, 2.22;
    "Fan", 0.3, 0.6, 0.9, 1.2, 1.5, 1.8, 2.1, 2.4, 2.7, 3;
    "Total losses", 4.9226, 6.7029, 8.68886, 10.8794, 13.2737, 15.8713, 18.672, 21.6757, 24.8823, 28.2918;
    "Efficiency", 0.924177, 0.947098, 0.953951, 0.956635, 0.957629, 0.957775, 0.957435, 0.956793, 0.955951, 0.95497
]
# [plot: eff_PSU_HL_total(load) vs load]
# Export to Excel
filename_LL := "LL_losses.xlsx"
data_LL := P_loss_table_LL_total
test := WRITEEXCEL(filename_LL, data_LL)
filename_HL := "HL_losses.xlsx"
data_HL := P_loss_table_HL_total
test := WRITEEXCEL(filename_HL, data_HL)
# PSU Efficiency
eff_PSU_LL_total(0.1) = 0.91248
eff_PSU_HL_total(0.1) = 0.924177
eff_PSU_LL_total(0.2) = 0.933731
eff_PSU_HL_total(0.2) = 0.947098
eff_PSU_LL_total(0.5) = 0.940653
eff_PSU_HL_total(0.5) = 0.957629
eff_PSU_LL_total(1) = 0.932646
eff_PSU_HL_total(1) = 0.95497
# Check if efficiency is met
check(eff_PSU_LL_total(0.5), 0.94) = "PASS"
eff_PSU_LL_total(0.5) = 0.940653
check(eff_PSU_LL_total(1), 0.92) = "PASS"
eff_PSU_LL_total(1) = 0.932646
check(eff_PSU_HL_total(0.5), 0.94) = "PASS"
eff_PSU_HL_total(0.5) = 0.957629
check(eff_PSU_HL_total(1), 0.92) = "PASS"
eff_PSU_HL_total(1) = 0.95497
