# 600W 12V PSU Design
# Primary Digital, Secondary Analog Control
# Andrew
# Topology: Single-phase boost PFC + Half-bridge LLC, center-tapped secondary (diode SR)
# General-purpose Functions
# Check pass/fail
check(a, b) :=
    if a ≥ b
        "PASS"
    else
        "FAIL"
# Wire diameter
D_wire(AWG) := (10*2.54/π*10^(-AWG/20)) mm
# Wire + insulation diameter
D_wire_insul(AWG) := (10*2.54/π*10^(-AWG/20) + 0.028*sqrt(10*2.54/π*10^(-AWG/20))*sqrt(10)) mm
# Wire cross section area
A_wire(AWG) := π*D_wire(AWG)^2/4
# Wire + insultation cross section area
A_wire_insul(AWG) := π*D_wire_insul(AWG)^2/4
# Litz wire diameter
D_Litz(AWG, strand) := sqrt(4*A_wire_insul(AWG)*strand/π)
# Copper resistivity
ρ_Cu(temp) := 1.724*(1 + 0.0042*(temp - 20))*10^-5 mm*Ω
# Copper dc current density
J_Cu_dc := 4.5 A/mm^2
# Wire resistance
R_wire(temp, AWG) := ρ_Cu(temp)/A_wire(AWG)
# Wire maximum current
I_wire(AWG) := J_Cu_dc*A_wire(AWG)
# Operating Conditions
# Input
# Minimum input voltage
V_ac_min := 90 V
# Maximum input voltage
V_ac_max := 264 V
# Nominal input voltage
V_ac_nom := 230 V
# Minimum input frequency
f_ac_min := 47 Hz
# Maximum input frequency
f_ac_max := 63 Hz
# Bulk
# Nominal bulk voltage
V_bulk_nom := 400 V
# Bulk voltage ripple
V_bulk_ripple := 10 V
# Minimum bulk voltage
V_bulk_min := V_bulk_nom - V_bulk_ripple = 390 V
# Maximum bulk voltage
V_bulk_max := V_bulk_nom + V_bulk_ripple = 410 V
# Check if bulk voltage above maximum ac high line
check(V_bulk_min, V_ac_max*sqrt(2)) = "PASS"
# Bulk voltage during holdup
V_bulk_holdup := 260 V
# PFC target efficiency
η_PFC := 97%
# PFC switching frequency
f_sw := 100 kHz
# PSU
# Hold-up time
t_holdup := 20 ms
# Output
# DC-DC target efficiency
η_LLC := 98%
# Nominal output power
P_out_nom := 600 W
# Nominal bulk power
P_bulk_nom := P_out_nom/η_LLC = 612.245 W
# Nominal output voltage
V_out_nom := 36 V
# Output voltage adjustment
V_out_adj := 20%
# Minimum output voltage
V_out_min := V_out_nom*(100% - V_out_adj) = 28.8 V
# Maximum output voltage
V_out_max := V_out_nom*(100% + V_out_adj) = 43.2 V
# Output voltage peak-to-peak ripple
ΔV_pp_max := V_out_nom*1% = 0.36 V
# Nominal output power
P_out_nom := 600 W
# Nominal output current
I_out_nom := P_out_nom/V_out_nom = 16.6667 A
# DC-DC efficiency target
η_LLC := 98%
# LLC Topology
# Number of parallel secondary
N_parallel := 1
# Primary; full-bridge = 4, half-bridge = 2
topo_pri := 2
# Secondary; full-bridge = 4, half-bridge = 2
topo_sec := 2
# Thermals
# Minimum ambient temperature
T_amb_min := 0 °C
# Maximum ambient temperature
T_amb_max := 55 °C
# Nominal air velocity
v_air := 2 m/s
# Boost Inductor/PFC Coil Design
# Peak inductor current
I_coil_pk_LL_max(load) := sqrt(2)*P_bulk_nom*load/(η_PFC*V_ac_min)
I_coil_pk_LL_max(1) = 9.91804 A
I_coil_pk_HL_max(load) := sqrt(2)*P_bulk_nom*load/(η_PFC*V_ac_nom)
I_coil_pk_HL_max(1) = 3.88097 A
# RMS inductor current
I_coil_LL_rms(load) := P_bulk_nom*load/(η_PFC*V_ac_min)
I_coil_LL_rms(1) = 7.01311 A
I_coil_HL_rms(load) := P_bulk_nom*load/(η_PFC*V_ac_nom)
I_coil_HL_rms(1) = 2.74426 A
# Ratio of allowable peak-to-peak ripple current to peak current in inductor (ripple current ratio)
I_ratio := 20%  # Choose between 25%-45%
# Peak inductor current including ripple
I_coil_pk_LL_max(load) := I_coil_pk_LL_max(load)*(100% + I_ratio)
I_coil_pk_LL_max(1) = 11.9017 A
I_coil_pk_HL_max(load) := I_coil_pk_HL_max(load)*(100% + I_ratio)
I_coil_pk_HL_max(1) = 4.65717 A
# Inductance
L_PFC := V_ac_min^2/(2*I_ratio*f_sw*P_bulk_nom*η_PFC) = 340.979 μH
L_PFC := 340 μH
# Actual current ratio
I_ratio := V_ac_min^2/(2*f_sw*P_bulk_nom*η_PFC*L_PFC) = 0.200576
# Actual peak inductor current including ripple
I_coil_pk_LL_max(load) := sqrt(2)*P_bulk_nom*load/(η_PFC*V_ac_min)
I_coil_pk_LL_max(load) := I_coil_pk_LL_max(load)*(100% + I_ratio)
I_coil_pk_LL_max(1) = 11.9074 A
I_coil_pk_HL_max(load) := sqrt(2)*P_bulk_nom*load/(η_PFC*V_ac_nom)
I_coil_pk_HL_max(load) := I_coil_pk_HL_max(load)*(100% + I_ratio)
I_coil_pk_HL_max(1) = 4.6594 A
# Select core size
# Effective magnetic path length
l_e_PFC := 81.5 mm = 81.5 mm  # CH330125
# Effective core-sectional area
A_e_PFC := 67.2 mm^2
# Minimum area
A_min_PFC := A_e_PFC*.9 = 60.48 mm^2
# Effective volume
V_e_PFC := 5476.8 mm^3 = 5.4768 cm^3
# Window area
A_w_PFC := 293 mm^2 = 293 mm^2
T := 1/f_sw = 10 μs  # REF: www.mag-inc.com/Products/Powder-Cores/Kool-Mu-Cores/PFC-Boost-Design
Iout := P_out_nom/(η_LLC*V_bulk_nom) = 1.53061 A
Dmax := 1 - V_ac_min/V_bulk_nom = 0.775
Dmin := 1 - V_ac_max/V_bulk_nom = 0.34
# INDUCTOR CURRENT
Iavg_min := Iout*(1/(1 - Dmin)) = 2.31911 A
Iavg_max := Iout*(1/(1 - Dmax)) = 6.80272 A
# INDUCTANCE
Iripple := Iavg_min*I_ratio*2 = 0.930316 A
L_PFC := (V_ac_max - 1 V)/Iripple*Dmin*T = 0.961179 mH
# WORST CASE PEAK
Iripple := (V_ac_min - 1 V)/L_PFC*Dmax*T = 0.717608 A
Ipk := Iavg_max + Iripple/2 = 7.16153 A
# CORE SELECTION
L_PFC/(1 mH)*(Ipk/(1 A))^2 = 49.2964
# CH330125
Al := 127
u := 125
Awindow := 2.93 cm^2
le := 8.15 cm
Ve := 5.4768 cm^3
Across := 0.672 cm^2
Dinner := 19.94 mm
Douter := 33.02 mm
Ht := 10.67 mm
MLT := Dinner/2*π = 3.13217 cm
# NUMBER OF TURNS
N := sqrt(L_PFC*2/(1 H*Al*10^-9)) = 123.031
# FILL FACTOR
R_wire(temp, AWG) := ρ_Cu(temp)/A_wire(AWG)
D_Litz(AWG, strand) := sqrt(4*A_wire_insul(AWG)*strand/π)
Wa := π/4*D_Litz(38, 90)^2 = 0.0119521 cm^2
Fill := N*Wa/Awindow = 0.501872
# Dimensions
# Required Turns
# Choose number of turns
N_PFC := 123
# Wire size
AWG_PFC := 38
# Wire diameter
D_wire(AWG_PFC) = 0.101785 mm
# Number of strands
strand_PFC := 90
# Litz wire diameter
D_Litz_PFC := D_Litz(AWG_PFC, strand_PFC) = 1.23361 mm
D_Litz_PFC := D_Litz_PFC = 1.23361 mm
# PFC inductance
L_PFC = 961.179 μH
# 7 turns x 5 layers
# 5 turns x 1 layer
# Cross section area
A_PFC := A_wire(AWG_PFC)*strand_PFC = 0.732319 mm^2
# Operating current density
J_PFC_LL := I_coil_LL_rms(1)/A_PFC = 9.57659 A/mm^2
J_PFC_HL := I_coil_HL_rms(1)/A_PFC = 3.74736 A/mm^2
# Wire length
l_PFC := N_PFC*MLT = 3.85257 m
# Wire DC resistance
R_PFC := ρ_Cu(25)*l_PFC/A_PFC = 0.0926004 Ω
# Primary copper loss
P_PFC_Cu_LL(load) := I_coil_LL_rms(load)^2*R_PFC
P_PFC_Cu_LL(1) = 4.55444 W
P_PFC_Cu_HL(load) := I_coil_HL_rms(load)^2*R_PFC
P_PFC_Cu_HL(1) = 0.697372 W
# Window utilization factor
K_u_PFC := (A_PFC*N_PFC)/A_w_PFC = 0.307424
# Andrew edit ends here
# PFC choke core
# Operating magnetic flux density
ΔB_pp_LL := V_ac_min*(1 - V_ac_min/V_bulk_nom)/(N_PFC*A_e_PFC*f_sw) = 0.0843859 T
ΔB_pp_HL := V_ac_nom*(1 - V_ac_nom/V_bulk_nom)/(N_PFC*A_e_PFC*f_sw) = 0.118261 T
# Core loss density
P_v_KF9_LL(load) := 0.0167*(f_sw/Hz)^1.84*(ΔB_pp_LL/(1 T))^2.923 W/m^3
P_v_PFC_LL(load) := P_v_KF9_LL(load)
P_v_KF9_HL(load) := 0.0167*(f_sw/Hz)^1.84*(ΔB_pp_HL/(1 T))^2.923 W/m^3
P_v_PFC_HL(load) := P_v_KF9_HL(load)
# Core loss
P_PFC_core_LL(load) := P_v_PFC_LL(load)*V_e_PFC
P_PFC_core_LL(1) = 0.105373 W
P_PFC_core_HL(load) := P_v_PFC_HL(load)*V_e_PFC
P_PFC_core_HL(1) = 0.282593 W
P_PFC_Cu_LL(1) = 4.55444 W
# PFC choke loss
# Total loss
P_PFC_choke_LL(load) := P_PFC_Cu_LL(load) + P_PFC_core_LL(load)
P_PFC_choke_LL(1) = 4.65981 W
P_PFC_choke_HL(load) := P_PFC_Cu_HL(load) + P_PFC_core_HL(load)
P_PFC_choke_HL(1) = 0.979965 W
# Diode Bridge
# Diode bridge forward voltage
V_f_bridge := 0.86 V
# GBU15JL
# Lite-On PN: 8A0997
# Bridge power loss
P_bridge_LL(load) := 4*sqrt(2)/π*V_f_bridge/V_ac_min*P_bulk_nom/η_PFC*load
P_bridge_LL(1) = 10.8601 W
P_bridge_HL(load) := 4*sqrt(2)/π*V_f_bridge/V_ac_nom*P_bulk_nom/η_PFC*load
P_bridge_HL(1) = 4.24961 W
# Boost Diode
# Boost diode forward voltage
V_f_diode := 2 V
# C3D06060F
# Lite-On PN: 813519
# Boost diode power loss
P_diode(load) := V_f_diode*P_bulk_nom*load/V_bulk_nom
P_diode(1) = 3.06122 W
# Boost MOSFET
# Boost MOSFET rms current
I_M_LL_rms(load) := P_bulk_nom*load/(η_PFC*V_ac_min)*sqrt(1 - 8*sqrt(2)*V_ac_min/(3*π*V_bulk_nom))
I_M_LL_rms(1) = 5.99162 A
I_M_HL_rms(load) := P_bulk_nom*load/(η_PFC*V_ac_nom)*sqrt(1 - 8*sqrt(2)*V_ac_nom/(3*π*V_bulk_nom))
I_M_HL_rms(1) = 1.52734 A
# Number of PFC MOSFET
n_PFC := 1
# IPP60R060P7
# Lite-On PN: 8A01VV
# PFC MOSFET Rdson
R_ds_on_PFC := 0.06 Ω
# PFC MOSFET input capacitance
C_iss_PFC := 2895 pF
# PFC MOSFET output capacitance
C_oss_PFC := 48 pF
# PFC MOSFET reverse capacitance
C_rss_PFC := 5 pF
# PFC MOSFET stored energy
E_oss_PFC := 7.1*10^-6 J
# PFC MOSFET gate charge
Q_g_PFC := 67 nC
# PFC MOSFET gate voltage
V_g_PFC := 10 V
# PFC MOSFET threshold voltage
V_th_PFC := 3.5 V
# PFC MOSFET plateau voltage
V_pl_PFC := 5.2 V
# PFC MOSFET gate resistance
R_g_PFC := 11 Ω
# PFC MOSFET turn-on voltage
V_on_PFC := V_bulk_nom = 400 V
# PFC MOSFET conduction loss
P_con_LL_PFC(load) := I_M_LL_rms(load)^2*R_ds_on_PFC/n_PFC
P_con_LL_PFC(1) = 2.15397 W
P_con_HL_PFC(load) := I_M_HL_rms(load)^2*R_ds_on_PFC/n_PFC
P_con_HL_PFC(1) = 0.139967 W
# Turn-on time
t_on_PFC := n_PFC*C_iss_PFC*R_g_PFC*ln((V_g_PFC - V_th_PFC)/(V_g_PFC - V_pl_PFC)) + n_PFC*C_rss_PFC*R_g_PFC*((V_bulk_nom - V_pl_PFC)/(V_g_PFC - V_pl_PFC))
t_on_PFC = 14.1787 ns
# Turn-on power loss
P_on_LL_PFC(load) := 0.5*I_coil_LL_rms(load)*V_bulk_nom*t_on_PFC*f_sw
P_on_LL_PFC(1) = 1.98874 W
P_on_HL_PFC(load) := 0.5*I_coil_HL_rms(load)*V_bulk_nom*t_on_PFC*f_sw
P_on_HL_PFC(1) = 0.778202 W
# Turn-off time
t_off_PFC := n_PFC*C_iss_PFC*R_g_PFC*ln(V_pl_PFC/V_th_PFC) + n_PFC*C_rss_PFC*R_g_PFC*((V_bulk_nom - V_pl_PFC)/V_pl_PFC)
t_off_PFC = 16.7831 ns
# Turn-off power loss
P_off_LL_PFC(load) := 0.5*I_coil_LL_rms(load)*V_bulk_nom*t_off_PFC*f_sw
P_off_LL_PFC(1) = 2.35403 W
P_off_HL_PFC(load) := 0.5*I_coil_HL_rms(load)*V_bulk_nom*t_off_PFC*f_sw
P_off_HL_PFC(1) = 0.921143 W
# Output capacitance switching loss
P_PFC_eoss := n_PFC*E_oss_PFC*f_sw = 0.71 W
# Gate driver loss
P_PFC_driver := n_PFC*V_g_PFC*Q_g_PFC*f_sw = 0.067 W
# PFC MOSFET loss
P_PFC_MOSFET_LL(load) := P_con_LL_PFC(load) + P_on_LL_PFC(load) + P_off_LL_PFC(load) + P_PFC_eoss + P_PFC_driver
P_PFC_MOSFET_LL(1) = 7.27374 W
P_PFC_MOSFET_HL(load) := P_con_HL_PFC(load) + P_on_HL_PFC(load) + P_off_HL_PFC(load) + P_PFC_eoss + P_PFC_driver
P_PFC_MOSFET_HL(1) = 2.61631 W
# Relay
# Relay contact resistance
R_relay := 0.01 Ω
# Relay current
I_relay_LL_rms(load) := P_bulk_nom*load/(η_PFC*V_ac_min)*sqrt(8*sqrt(2)*V_ac_min/(3*π*V_bulk_nom))
I_relay_LL_rms(1) = 3.64476 A
I_relay_HL_rms(load) := P_bulk_nom*load/(η_PFC*V_ac_nom)*sqrt(8*sqrt(2)*V_ac_nom/(3*π*V_bulk_nom))
I_relay_HL_rms(1) = 2.27996 A
# Relay loss
P_relay_LL(load) := I_relay_LL_rms(load)^2*R_relay
P_relay_LL(1) = 0.132843 W
P_relay_HL(load) := I_relay_HL_rms(load)^2*R_relay
P_relay_HL(1) = 0.051982 W
# EMI Choke
# EMI Choke 1 - Common Mode
# Outer diameter
OD_emi1 := 17 mm
# T17.5*12.6*6
# 2*20 turns
# 8.1mH each winding
# Lite-On PN: 819891
# Inner diameter
ID_emi1 := 12.4 mm
# Height
HT_emi1 := 6.5 mm
# Effective magnetic path length
l_e_emi1 := 4.61 cm
# Effective core-sectional area
A_e_emi1 := 0.12 cm^2
# Effective volume
V_e_emi1 := 0.55 cm^2
# Number of turns
N_emi1 := 20
# Wire gauge
AWG_emi1 := 19
# Wire diameter
D_emi1 := D_wire(AWG_emi1) = 0.90716 mm
# Wire area
A_emi1 := A_wire(AWG_emi1) = 0.646335 mm^2
# Number of wire strands
strand_emi1 := 1
# Current density of wire
J_emi1_LL := I_coil_LL_rms(1)/A_emi1 = 10.8506 A/mm^2
J_emi1_HL := I_coil_HL_rms(1)/A_emi1 = 4.24588 A/mm^2
# Total wire length
l_emi1 := 2*(N_emi1*((OD_emi1 - ID_emi1) + HT_emi1*2))*1.1 = 0.7744 m
# Total wire resistance
R_emi1 := ρ_Cu(25)*l_emi1/A_emi1 = 0.0210897 Ω
# EMI 2 power loss
P_emi1_LL(load) := I_coil_LL_rms(load)^2*R_emi1
P_emi1_LL(1) = 1.03727 W
P_emi1_HL(load) := I_coil_HL_rms(load)^2*R_emi1
P_emi1_HL(1) = 0.158826 W
# EMI Choke 2 - Differential Mode
# Outer diameter
OD_emi2 := 17.3 mm
# T17.27*9.65*6.35
# 36 turns
# 55.72uH
# Lite-On PN: 793591
# Inner diameter
ID_emi2 := 9.7 mm
# Height
HT_emi2 := 6.4 mm
# AL value
AL_emi2 := 0.043 μH
# Relative permeability
μ_r_emi2 := 60
# Number of turns
N_emi2 := 36
# Wire gauge
AWG_emi2 := 18
# Wire diameter
D_emi2 := D_wire(AWG_emi2) = 1.01785 mm
# Wire area
A_emi2 := A_wire(AWG_emi2) = 0.813687 mm^2
# Number of wire strands
strand_emi2 := 1
# Current density of wire
J_emi2_LL := I_coil_LL_rms(1)/A_emi2 = 8.61893 A/mm^2
J_emi2_HL := I_coil_HL_rms(1)/A_emi2 = 3.37262 A/mm^2
# Total wire length
l_emi2 := N_emi2*((OD_emi2 - ID_emi2) + HT_emi2*2)*1.1 = 0.80784 m
# Total wire resistance
R_emi2 := ρ_Cu(25)*l_emi2/A_emi2 = 0.0174755 Ω
# EMI 2 power loss
P_emi2_LL(load) := I_coil_LL_rms(load)^2*R_emi2
P_emi2_LL(1) = 0.859513 W
P_emi2_HL(load) := I_coil_HL_rms(load)^2*R_emi2
P_emi2_HL(1) = 0.131608 W
# If use same common mode
P_emi2_LL(load) := P_emi1_LL(load)
P_emi2_LL(1) = 1.03727 W
P_emi2_HL(load) := P_emi1_HL(load)
P_emi2_HL(1) = 0.158826 W
# PFC Loss
# Total PFC loss
P_PFC_LL_total(load) := P_bridge_LL(load) + P_diode(load) + P_PFC_MOSFET_LL(load) + P_relay_LL(load) + P_emi1_LL(load) + P_emi2_LL(load)
P_PFC_HL_total(load) := P_bridge_HL(load) + P_diode(load) + P_PFC_MOSFET_HL(load) + P_relay_LL(load) + P_emi2_HL(load) + P_emi2_HL(load)
# PFC efficiency
eff_PFC_LL(load) := load*P_bulk_nom/W/(load*P_bulk_nom/W + P_PFC_LL_total(load)/W)
eff_PFC_HL(load) := load*P_bulk_nom/W/(load*P_bulk_nom/W + P_PFC_HL_total(load)/W)
# Loss components
P_PFC_loss_components_LL(load) := [
    load;
    P_relay_LL(load);
    P_bridge_LL(load);
    P_diode(load);
    P_PFC_MOSFET_LL(load);
    P_PFC_choke_LL(load);
    P_emi1_LL(load);
    P_emi2_LL(load);
    P_PFC_LL_total(load);
    eff_PFC_LL(load)
]
P_PFC_loss_components_HL(load) := [
    load;
    P_relay_HL(load);
    P_bridge_HL(load);
    P_diode(load);
    P_PFC_MOSFET_HL(load);
    P_PFC_choke_HL(load);
    P_emi1_HL(load);
    P_emi2_HL(load);
    P_PFC_HL_total(load);
    eff_PFC_HL(load)
]
# Loss components' captions
P_PFC_loss_caption := ["Load"; "Relay"; "Bridge diode"; "Boost diode"; "PFC MOSFET"; "PFC choke"; "EMI choke 1"; "EMI choke 2"; "Total PFC losses"; "PFC efficiency"]
# Table of PFC losses
P_PFC_loss_table_LL[:, 0] := P_PFC_loss_caption
P_PFC_loss_table_LL[:, 1] := P_PFC_loss_components_LL(0.1)
P_PFC_loss_table_LL[:, 2] := P_PFC_loss_components_LL(0.2)
P_PFC_loss_table_LL[:, 3] := P_PFC_loss_components_LL(0.5)
P_PFC_loss_table_LL[:, 4] := P_PFC_loss_components_LL(1.0)
P_PFC_loss_table_HL[:, 0] := P_PFC_loss_caption
P_PFC_loss_table_HL[:, 1] := P_PFC_loss_components_HL(0.1)
P_PFC_loss_table_HL[:, 2] := P_PFC_loss_components_HL(0.2)
P_PFC_loss_table_HL[:, 3] := P_PFC_loss_components_HL(0.5)
P_PFC_loss_table_HL[:, 4] := P_PFC_loss_components_HL(1.0)
P_PFC_loss_table_LL = [
    "Load", 0.1, 0.2, 0.5, 1;
    "Relay", 0.00132843 W, 0.00531371 W, 0.0332107 W, 0.132843 W;
    "Bridge diode", 1.08601 W, 2.17202 W, 5.43006 W, 10.8601 W;
    "Boost diode", 0.306122 W, 0.612245 W, 1.53061 W, 3.06122 W;
    "PFC MOSFET", 1.23282 W, 1.73171 W, 3.48688 W, 7.27374 W;
    "PFC choke", 0.150918 W, 0.287551 W, 1.24398 W, 4.65981 W;
    "EMI choke 1", 0.0103727 W, 0.0414909 W, 0.259318 W, 1.03727 W;
    "EMI choke 2", 0.0103727 W, 0.0414909 W, 0.259318 W, 1.03727 W;
    "Total PFC losses", 2.64702 W, 4.60428 W, 10.9994 W, 23.4025 W;
    "PFC efficiency", 0.958557, 0.963761, 0.965315, 0.963183
]
P_PFC_loss_table_HL = [
    "Load", 0.1, 0.2, 0.5, 1;
    "Relay", 0.00051982 W, 0.00207928 W, 0.0129955 W, 0.051982 W;
    "Bridge diode", 0.424961 W, 0.849922 W, 2.12481 W, 4.24961 W;
    "Boost diode", 0.306122 W, 0.612245 W, 1.53061 W, 3.06122 W;
    "PFC MOSFET", 0.948334 W, 1.12247 W, 1.66166 W, 2.61631 W;
    "PFC choke", 0.289567 W, 0.310488 W, 0.456936 W, 0.979965 W;
    "EMI choke 1", 0.00158826 W, 0.00635305 W, 0.0397065 W, 0.158826 W;
    "EMI choke 2", 0.00158826 W, 0.00635305 W, 0.0397065 W, 0.158826 W;
    "Total PFC losses", 1.68392 W, 2.60265 W, 5.42971 W, 10.3776 W;
    "PFC efficiency", 0.973232, 0.979187, 0.982572, 0.983332
]
# [plot: eff_PFC_LL(load) vs load]
# [plot: eff_PFC_HL(load) vs load]
# Minimum load to find peak efficiency
load_min := 0.01
# Maximum load to find peak efficiency
load_max := 1
# Starting load to find peak efficiency
load_guess := 0.5
solve block
    # guess values
    eff(load) := load*P_bulk_nom/W/(load*P_bulk_nom/W + P_PFC_HL_total(load)/W)
    # constraints
    load_min ≤ load_guess ≤ load_max
    # solver
    load_eff_max := maximize(eff, load_guess) = 1
end solve block
# Peak efficiency
eff_max := eff_PFC_HL(load_eff_max) = 0.983332
check(eff_max, η_PFC) = "PASS"
# LLC Transformer Turns Ratio and Gain
V_bulk_min := 390*V
V_bulk_nom := 400*V
V_bulk_max := 410*V
V_bulk_holdup = 260 V
# Required transformer turns ratio
n_tr_req := η_LLC*(V_bulk_nom/(0.25*topo_pri))/V_out_nom = 21.7778
# Number of primary turns
n_pri := 18
# Number of secondary turns
n_sec := 3
# Transformer turns ratio
n_tr := n_pri/n_sec = 6
# Inductance ratio, Lm/Lr
L_n := 6.2
# Actual turns after compensation of
# leakage inductance
n_tr_eff := n_tr*sqrt(1 + 1/L_n) = 6.46579
# Transformer gain
K_tr := 1/n_tr_eff = 0.15466
# Primary bridge gain
K_pri := 0.25*topo_pri = 0.5
# LLC Gain
# Nominal gain
M_nom := V_out_nom/V_bulk_nom*1/(K_tr*K_pri) = 1.16384
# Minimum gain during maximum Vbulk
M_min := V_out_min/V_bulk_max*1/(K_tr*K_pri) = 0.908365
# Maximum gain during minimum Vbulk
M_max := V_out_max/V_bulk_min*1/(K_tr*K_pri) = 1.43242
# Gain during end of holdup
M_holdup := V_out_nom/V_bulk_holdup*1/(K_tr*K_pri) = 1.79053
# ZVS Constraints
# (based on STM AN2450)
# Deadtime
T_D := 400 ns
M_max = 1.43242
# Maximum Q which allows maximum voltage gain at boundary between inductive and capacitive mode
Q_max := 1/(M_max*L_n)*sqrt(L_n + M_max^2/(M_max^2 - 1)) = 0.321466
# Constraint where input impedance has zero phase, with margin of 5%
Q_zvs_1 := 1/95%*Q_max = 0.338386
# Minimum operating frequency which allows the required maximum voltage gain at the boundary between capacitive and inductive mode.
f_n_min := sqrt(1/(1 + L_n*(1 - 1/M_max))) = 0.59011
# Maximum operating frequency
f_n_max := sqrt(1/(1 + L_n*(1 - 1/M_min))) = 1.63398
# Equivalent load resistance on primary
R_ac := 8/π^2*n_tr^2*V_out_nom^2/P_out_nom = 63.0299 Ω
# Output capacitance of primary mosfet
C_oss := 89*pF
# Total capacitance at bridge midpoint
# (excluding stray capacitance)
C_zvs := 2*C_oss = 178 pF
# Constraint on Q for ZVS at no-load and maximum input voltage
Q_zvs_2 := 2/π*f_n_max/(L_n*(1/(L_n + 1))*f_n_max^2 - 1/L_n)*T_D/(R_ac*C_zvs) = 17.3483
# Qmax has to be smaller than both Qzvs_1 and Q_zvs_2 for ZVS operation.
# Check if ZVS is fulfilled
check(Q_zvs_1, Q_max) = "PASS"
check(Q_zvs_2, Q_max) = "PASS"
# Resonant Tank Parameters
# Resonant inductance
L_r := 16 μH
# Resonant capacitance
C_r := 8*22 nF = 176 nF
# Magnetizing inductance
L_m := L_n*L_r = 99.2 μH
# Resonant frequency
f_r := 1/(2*π*sqrt(L_r*C_r)) = 94.8427 kHz
# FHA-based gain curve
# Equivalent resistance
R_eq(P_load) := n_tr^2*8/π^2*V_out_nom^2/P_load
# Quality factor
Q(P_load) := 1/R_eq(P_load)*sqrt(L_r/C_r)
# LLC gain
G_ac(f_s, P_load) := 1/sqrt((1 + 1/L_n*(1 - f_r^2/f_s^2))^2 + (f_s/f_r - f_r/f_s)^2*Q(P_load)^2)
# [plot: G_ac(f_s*Hz, 600 W), G_ac(f_s*Hz, 300 W), G_ac(f_s*Hz, 120 W), G_ac(f_s*Hz, 60 W) vs f_s]
# Check LLC operating range
# LLC gain
G_o(f_s, P_load) := G_ac(f_s, P_load)
# Zoomed-in gain curve for operating region
# [plot: G_ac(f_s*Hz, 600 W), G_ac(f_s*Hz, 300 W), G_ac(f_s*Hz, 120 W), G_ac(f_s*Hz, 60 W) vs f_s]
# Find maximum gain
# Redefine gain for 100% load condition
G_600W(f_s) := G_o(f_s, 600 W)
# Redefine gain for 50% load condition
G_300W(f_s) := G_o(f_s, 300 W)
# Redefine gain for 10% load condition
G_60W(f_s) := G_o(f_s, 60 W)
# Guess frequency
f_guess := 30 kHz
# Operating frequency at 100% load
f_max_600W := maximize(G_600W, f_guess) = 36.4516 kHz
# Maximum gain for 100% load
G_max_600W := G_o(f_max_600W, 600 W) = 2.91926
# Check if gain is sufficient
check(G_max_600W, M_holdup) = "PASS"
# Find typical operating frequency range
solve block
    # guess values
    f_min_guess := 90 kHz
    # constraints
    G_600W(f_min_guess) == M_max
    # solver
    f_min := find(f_min_guess) = 54.6637 kHz
end solve block
# Minimum frequency
# @ 100% load
solve block
    # guess values
    f_max_guess := 50 kHz
    # constraints
    G_60W(f_max_guess) == M_min
    # solver
    f_max := find(f_max_guess) = 154.832 kHz
end solve block
# Maximum frequency
# @ 10% load
solve block
    # guess values
    f_nom_guess := 50 kHz
    # constraints
    G_300W(f_nom_guess) == M_nom
    # solver
    f_nom := find(f_nom_guess) = 69.1464 kHz
end solve block
# Nominal frequency
# @ 50% load
# Strip units for graphing
f_min := f_min/Hz = 54663.7
f_max := f_max/Hz = 154832
f_nom := f_nom/Hz = 69146.4
# [plot: G_o(f_s*Hz, 600 W), G_o(f_s*Hz, 300 W), G_o(f_s*Hz, 120 W), G_o(f_s*Hz, 60 W) vs f_s]
# Holdup Calculations
# Minimum holdup voltage
# (from above)
V_bulk_holdup = 260 V
# Holdup time
t_holdup := 20 ms
# Minimum ac frequency
f_ac_min := 47 Hz
# Calculation 1 - For holdup
V_bulk_holdup := 190*V
C_bulk_1 := 2*P_out_nom*t_holdup/(V_bulk_min^2 - V_bulk_holdup^2) = 206.897 μF
V_bulk_min = 390 V
# Calculation 2 - For ripple requirements
C_bulk_2 := P_out_nom/(2*π*f_ac_min*(2*V_bulk_ripple)*V_bulk_nom) = 253.971 μF
# Required bulk capacitance
# Rubycon MXG 470uF
# 450V 30*50
# Lite-On PN: 738343
C_bulk := max(C_bulk_1, C_bulk_2) = 253.971 μF
# Voltage/Current Equations
# Output current
I_out(load) := I_out_nom*load
# SR rms current
I_sr_rms(load) := π/4*I_out(load)
# SR average current
I_sr_avg(load) := 0.636*I_sr_rms(load)
# Gold Finger
# Connector contact resistance
R_connector := 0.0004 Ω
# Number of contacts
n_connector := 1
# Voltage drop of connector
V_d_connector(load) := 2*I_out(load)*R_connector/n_connector
# Connector power loss
P_connector(load) := I_out(1)*V_d_connector(load)
P_connector(1) = 0.222222 W
# ORing
# ORing MOSFET Rdson
R_ds_on_oring := 4*10^-3 Ω
# FDMS4D0N12C
# 120VV
# Rds_on = 4mΩ
# Number in parallel
n_oring := 2
# Voltage drop of ORing
# MOSFET
V_d_oring(load) := I_out(load)*R_ds_on_oring/n_oring
# ORing MOSFET power loss
P_oring(load) := I_out(load)*V_d_oring(load)
P_oring(1) = 0.555556 W
# Output Rsense
# Output sense resistance
R_sense := 0.0005 Ω
# Number in parallel
n_sense := 1
# Voltage drop of sense resistor
V_d_sense(load) := I_out(load)*R_sense/n_sense
# Sense resistor power loss
P_sense(load) := I_out(load)^2*R_sense/n_sense
P_sense(1) = 0.138889 W
# SR MOSFET
# Secondary topology
topo_sec = 2
# Number of secondary stages
n_sec_stage := 1
# Number of parallel SR
n_sr_parallel := 1
# SR rms current at 100% load
I_sr_rms(1) = 13.09 A
# Number of SR (each switch)
n_sr := n_sec_stage*n_sr_parallel = 1
# SR Rdson
R_ds_on_sr := 3.5*10^-3 Ω
# OptiMOS 5
# BSC014N04LS
# 40V
# Rds_on = 1.4mΩ
# SR gate voltage
V_g_sr := 10 V
# SR gate charge
Q_g_sr := 61 nC
# Voltage drop of SR
V_d_sr(load) := I_sr_rms(load)*R_ds_on_sr/n_sr
V_d_sr(1) = 45.8149 mV
# Conduction loss of SR
P_sr_con(load) := I_sr_rms(load)^2*R_ds_on_sr/n_sr
P_sr_con(1) = 0.599716 W
# Switching loss of SR
P_sr_sw(load) := 0.1*P_sr_con(load)
P_sr_sw(1) = 0.0599716 W
# Gate driver loss of SR
P_sr_drv := V_g_sr*Q_g_sr*(f_nom*Hz) = 0.0421793 W
# SR power loss
P_sr(load) := topo_sec*(P_sr_con(load) + P_sr_sw(load) + P_sr_drv)
P_sr(1) = 1.40373 W
# Primary MOSFET
# Primary topology
topo_pri = 2
# Number of primary stages
n_pri_stage := 1
# Number of parallel MOSFET
n_pri_parallel := 1
# Number of primary MOSFET
# (each switch)
n_pri := n_pri_stage*n_pri_parallel = 1
# Total voltage drop up to primary MOSFET
V_d_total(load) := V_d_connector(load) + V_d_oring(load) + V_d_sense(load) + V_d_sr(load)
V_d_total(1) = 100.815 mV
# Total bridge PWM voltage
V_out_pwm(load) := V_out_nom + V_d_total(load)
V_out_pwm(1) = 36.1008 V
# Output current
I_out(1) = 16.6667 A
# Secondary rms current
I_sec_rms(load) := π/(2*sqrt(2))*I_out(load)
I_sec_rms(1) = 18.512 A
# Secondary peak current
I_sec_pk(load) := π/2*I_out(load)
I_sec_pk(1) = 26.1799 A
# Magnetizing peak current
I_m(load) := n_tr*V_out_pwm(load)/(4*L_m*(f_nom*Hz))
I_m(1) = 7.89455 A
# Magnetizing rms current
I_m_rms(load) := I_m(load)/sqrt(3)
I_m_rms(1) = 4.55792 A
# Primary rms current
I_pri_rms(load) := sqrt((I_sec_rms(load)/n_tr)^2 + I_m_rms(load)^2)
I_pri_rms(1) = 5.50399 A
# Primary peak current
I_pri_pk(load) := I_sec_pk(load)/n_tr + I_m(load)
I_pri_pk(1) = 12.2579 A
# Primary switch rms current
I_sw_rms(load) := I_pri_rms(load)*sqrt(0.5)
I_sw_rms(1) = 3.89191 A
# Primary MOSFET Rdson
R_ds_on_pri := 22*10^-3 Ω
# IPP60R022S7
# Lite-On PN: 8A07QR
# Primary gate voltage
V_g_pri := 10 V
# Primary gate charge
Q_g_pri := 150 nC
# Primary gate-drain charge
Q_gd_pri := 50 nC
# Primary gate-source charge
Q_gs_pri := 31 nC
# Primary MOSFET fall time
t_f_pri := 9 ns
# Primary MOSFET rise time
t_r_pri := 9 ns
# Primary MOSFET turn-off time
t_sw_pri_off := t_f_pri
# Total primary charge
Q_sw_pri := Q_gd_pri + Q_gs_pri/2 = 65.5 nC
# Conduction loss of primary
P_con_pri(load) := I_sw_rms(load)^2*R_ds_on_pri/n_pri_parallel
P_con_pri(1) = 0.333233 W
# Turn-off loss of primary
P_off_pri(load) := 1/2*V_bulk_nom*I_sw_rms(load)*(f_nom*Hz)*t_sw_pri_off*n_pri_parallel
P_off_pri(1) = 0.484401 W
# Gate driver loss of primary
P_drv_pri := V_g_pri*Q_g_pri*(f_nom*Hz)*n_pri_parallel = 0.10372 W
# Primary MOSFET power loss
P_pri(load) := topo_pri*(P_con_pri(load) + P_off_pri(load) + P_drv_pri)
P_pri(1) = 1.84271 W
# Output Capacitor
# Output current ac component
I_ripple_ac(load) := 0.448*I_out(load)
I_ripple_ac(1) = 7.46667 A
# Output rms current
I_out_rms(load) := I_out(load)*π/(2*sqrt(2))
I_out_rms(1) = 18.512 A
# Output current ripple
ΔI_out(load) := I_out(load)*π/2
ΔI_out(1) = 26.1799 A
# Output capacitor current ripple
I_co_rms(load) := sqrt(I_out_rms(load)^2 - I_out(load)^2)
I_co_rms(1) = 8.0571 A
# Output capacitor current ripple
I_co_rms(load) := sqrt((π^2 - 8)/8)*I_out(load)
I_co_rms(1) = 8.0571 A
# Number of electrolytic capacitors
n_co_ecap := 4
# Number of ceramic capacitors
n_co_ceramic := 6
# Electrolytic capacitor value
C_o_ecap := 100 μF  # Lite-On PN: 818242
# Electrolytic capacitor ESR
ESR_ecap := 0.020 Ω
# Electrolytic capacitor ESL
ESL_ecap := (0.037*0.09) μH = 3.33e-9 H
# Electrolytic capacitor ripple current rating
I_co_ecap := 3.4 A
# Ceramic capacitor value
C_o_ceramic := 2.2 μF  # Lite-On PN: 8A0AKK
# Ceramic capacitor ESR
ESR_ceramic := 0.02 Ω
# Ceramic capacitor ESL
ESL_ceramic := 0.0004 μH
# Ceramic capacitor ripple current rating
I_co_ceramic := 2 A
# Total output capacitance
Co_total := C_o_ecap*n_co_ecap + C_o_ceramic*n_co_ceramic = 413.2 μF
# Total output capacitor ripple current rating
I_co_rms_rated := (I_co_ecap*n_co_ecap + I_co_ceramic*n_co_ceramic) = 25.6 A
# Check if rating sufficient
# Derating <70% desired
I_rating := I_co_rms(1)/I_co_rms_rated = 0.31473
check(70%, I_rating) = "PASS"
# Electrolytic capacitor impedance
Z_co_ecap := sqrt(((ESR_ecap/Ω)^2 + (2*π*f_nom*ESL_ecap/H)^2))/n_co_ecap*Ω = 0.00501306 Ω
# Ceramic capacitor impedance
Z_co_ceramic := sqrt(((ESR_ceramic/Ω)^2 + (2*π*f_nom*ESL_ceramic/H)^2))/n_co_ceramic*Ω = 0.00333346 Ω
# Total capacitor impedance
Z_co_total := 1/(1/Z_co_ecap + 1/Z_co_ceramic) = 0.00200213 Ω
# Equivalent ESR of output capacitors
ESR_eqv := Z_co_total = 0.00200213 Ω
# Output peak-to-peak voltage ripple
V_ripple_pp(load) := ΔI_out(load)*Z_co_total
V_ripple_pp(1) = 52.4157 mV
# Rated output voltage ripple
V_ripple_max := V_out_nom*0.01 = 0.36 V
check(V_ripple_max, V_ripple_pp(1)) = "PASS"
P_co(load) := I_co_rms(load)^2*ESR_eqv
# Output capacitor power loss
P_co(1) = 0.129972 W
# Output Choke Losses
# 2.6uH
# Lite-On PN: 826455
# Output choke resistance
R_choke := 0.000000214 Ω
# Number of chokes in parallel
n_choke := 1
# Output choke power loss
P_choke(load) := I_out(load)^2*R_choke/n_choke + 0.3 W
# 0.3W loss for 10C temp rise
P_choke(1) = 0.300059 W
# LLC Main Transformer
# Transformer total power
P_tr_nom := P_bulk_nom + P_out_nom = 1.21224 kW
# Magnetizing inductance
L_m = 99.2 μH
# Current factor
K_f := 4
# Winding packing factor
K_u := 0.2
# Maximum flux density
B_m := 0.2 T
# Current density
J_c := 12 A/mm^2
# Resonant frequency
f_r = 94.8427 kHz
# Minimum frequency
f_min := f_min*Hz = 54.6637 kHz
# Required area product
AP_req := P_tr_nom/(K_f*K_u*B_m*J_c*f_min) = 1.15502 cm^4
# Select core size
# Effective magnetic path length
l_e := 77 mm
# Effective core-sectional area
A_e := 192 mm^2
# Minimum area
A_min := 163 mm^2
# PQ3530 KF9
# Lite-On PN: xxxxx
# Effective volume
V_e := 14800 mm^3
# Window area
A_w := 114.86 mm^2
# Dimensions
A := 36.1 mm
D1 := 32 mm
F := 20.24 mm
B := 30 mm
D2 := 23.5 mm
C := 26 mm
E := 14.4 mm
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# Bobbin thickness
B_thk := 1.1 mm
# Bobbin winding height
H_b := F - 2*B_thk = 18.04 mm
# Bobbin winding width
W_b := ((D1 - E)/2) - B_thk = 7.7 mm
# Mean length turn
MLT := ((D1 + E)/2)*π = 72.8849 mm
# AL value
A_L := 7.2 μH
# Maximum flux density of KF9
B_m_KF9 := 0.275*T
# Winding area
A_w := 2*H_b*W_b = 277.816 mm^2
# Area product
AP := A_e*A_w = 5.33407 cm^4
AP_req = 1.15502 cm^4
check(AP, AP_req) = "PASS"
# Transformer primary
# Effective core-sectional area
A_e_tr := A_e = 192 mm^2
# Effective volume
V_e_tr := V_e = 14800 mm^3
# Maximum flux density
B_max := B_m = 0.2 T
# Turns ratio
n_tr = 6
# Primary turns
N_p_min := n_tr*V_out_pwm(1)/(4*f_min*B_max*A_e_tr) = 25.7975
N_pri := 16
# Secondary turns
N_sec := N_pri/n_tr = 2.66667
# Required center airgap
l_gap_tr := N_pri^2*A_e*μ_0/L_m = 0.622643 mm
# Skin depth
d_skin := 6.62 cm/sqrt(f_sw/Hz) = 0.209343 mm
l_skin := 2*d_skin = 0.418686 mm
# LLC current values
I_out(1) = 16.6667 A
I_pri_pk(1) = 12.2579 A
I_sec_pk(1) = 26.1799 A
I_pri_rms(1) = 5.50399 A
I_sec_rms(1) = 18.512 A
I_sw_rms(1) = 3.89191 A
I_sr_rms(1) = 13.09 A
# Primary winding
# Wire size
AWG_pri := 38
# Wire diameter
D_wire(AWG_pri) = 0.101785 mm
# Number of strands
strand_pri := 80
# Litz wire diameter
D_Litz_pri := D_Litz(AWG_pri, strand_pri) = 1.16306 mm
D_Litz_pri := D_Litz_pri*1.2 = 1.39567 mm
# Primary turns
N_pri = 16
# Max primary turns per layer
N_turns_pri := H_b/D_Litz_pri = 12.9257  # 8 turns x 2 layers
# Cross section area
A_pri := A_wire(AWG_pri)*strand_pri = 0.65095 mm^2
# Operating current density
J_pri := I_pri_rms(1)/A_pri = 8.45532 A/mm^2
# Mean length turn
MLT_pri := MLT = 72.8849 mm
# Wire length
l_pri := N_pri*MLT_pri = 1.16616 m
# Wire DC resistance
R_pri := ρ_Cu(25)*l_pri/A_pri = 0.0315336 Ω
# Primary copper loss
P_tr_pri(load) := I_pri_rms(load)^2*R_pri
P_tr_pri(1) = 0.955276 W
# Secondary winding
# Wire size
AWG_sec := 38
# Wire diameter
D_wire(AWG_sec) = 0.101785 mm
# Number of strands
strand_sec := 2*150
# Litz wire diameter
D_Litz_sec := D_Litz(AWG_sec, strand_sec) = 2.25225 mm
# Primary turns
N_sec = 2.66667
# Max primary turns per layer
N_turns_sec := H_b/D_Litz_sec = 8.00976  # 4 turns x 1 layer
# Cross section area
A_sec := A_wire(AWG_sec)*strand_sec = 2.44106 mm^2
# Operating current density
J_sec := I_sec_rms(1)/A_sec = 7.58359 A/mm^2
# Mean length turn
MLT_sec := MLT = 72.8849 mm
# Wire length
l_sec := N_sec*MLT_sec = 0.19436 m
# Wire DC resistance
R_sec := ρ_Cu(25)*l_sec/A_sec = 0.00140149 Ω
# Primary copper loss
P_tr_sec(load) := I_sec_rms(load)^2*R_sec
P_tr_sec(1) = 0.480284 W
# All windings
# Window utilization factor
K_u_tr := 2*(A_pri*N_pri + A_sec*N_sec)/A_w = 0.121841
# Transformer copper loss
P_tr_Cu(load) := P_tr_pri(load) + P_tr_sec(load)
P_tr_Cu(1) = 1.43556 W
# Core loss
# Operating magnetic flux density
B_max_oper(load) := n_tr*V_out_pwm(load)/(4*f_sw*N_pri*A_e_tr)
B_max_oper(1) = 0.176274 T
P_v_KF9(load) := 0.0167*(f_sw/Hz)^1.84*(B_max_oper(load)/(1 T))^2.923 W/m^3
# Core loss density
P_v_tr(load) := P_v_KF9(load)
# Core loss
P_tr_core(load) := P_v_tr(load)*V_e_tr
P_tr_core(1) = 2.45235 W
# Transformer loss
P_tr(load) := P_tr_Cu(load) + P_tr_core(load)
P_tr(1) = 3.88791 W
# Resonant Choke
# Voltage on choke
V_Lr_max := Q_max*V_bulk_max = 131.801 V
# Resonant rms current
I_Lr_rms(load) := I_pri_rms(load)
I_Lr_rms(1) = 5.50399 A
# Resonant peak current
I_Lr_peak(load) := sqrt(2)*I_Lr_rms(load)
I_Lr_peak(1) = 7.78382 A
# Resonant OCP current
I_Lr_ocp_peak := I_Lr_peak(1)*1.3 = 10.119 A
l_e := 77 mm
# Resonant choke total power
P_Lr_nom := P_bulk_nom = 0.612245 kW
# Effective core-sectional area
A_e := 192 mm^2
# Resonant inductance
L_r = 16 μH
# Minimum area
A_min := 163 mm^2
# PQ3530 KF9
# Lite-On PN: xxxxx
# Current factor
K_f := 4
# Effective volume
V_e := 14800 mm^3
# Winding packing factor
K_u := 0.2
# Window area
A_w := 114.86 mm^2
# Maximum flux density
B_m := 0.2 T
# Current density
J_c = 12 A/mm^2
# Resonant frequency
f_r = 94.8427 kHz
# Minimum frequency
f_min := f_min = 54.6637 kHz
# Required area product
AP_req := P_Lr_nom/(K_f*K_u*B_m*J_c*f_min) = 0.583344 cm^4
# Dimensions
A := 36.1 mm
D1 := 32 mm
F := 20.24 mm
# Select core size
# Using integrated with transformer - only half core
B := 30 mm
D2 := 23.5 mm
# Effective magnetic path length
l_e_Lr := l_e/2 = 38.5 mm
C := 26 mm
E := 14.4 mm
# Effective core-sectional area
A_e_Lr := A_e/2 = 96 mm^2
# Minimum area
A_min_Lr := A_min/2 = 81.5 mm^2
# Effective volume
V_e_Lr := V_e/2 = 7400 mm^3
# Window area
A_w_Lr := A_w/2 = 57.43 mm^2
# Dimensions
A := 36 mm
D1 := 32 mm
F := 20.24 mm/2
B := 30 mm/2
D2 := 23.5 mm
C := 26 mm
E := 14.4 mm
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# Bobbin thickness
B_thk := 1.1 mm
# Bobbin winding height
H_b_Lr := F - 2*B_thk = 7.92 mm
# Bobbin winding width
W_b_Lr := ((D1 - E)/2) - B_thk = 7.7 mm
# Mean length turn
MLT := ((D1 + E)/2)*π = 72.8849 mm
# AL value
A_L := 7.2 μH
# Maximum flux density of KF9
B_m_KF9 := 0.275*T
# Winding area
A_w_Lr := 2*H_b_Lr*W_b_Lr = 121.968 mm^2
# Area product
AP := A_e*A_w_Lr = 2.34179 cm^4
AP_req = 0.583344 cm^4
check(AP, AP_req) = "PASS"
# Resonant choke winding
# Wire size
AWG_Lr := AWG_pri = 38
# Wire diameter
D_wire(AWG_Lr) = 0.101785 mm
# Number of strands
strand_Lr := strand_pri = 80
# Litz wire diameter
D_Litz_Lr := D_Litz(AWG_Lr, strand_Lr) = 1.16306 mm
D_Litz_Lr := D_Litz_Lr*1.2 = 1.39567 mm
# Resonant inductance
L_r = 16 μH
# Set Bmax
B_max_Lr := 0.1 T
# Number of turns (1)
N_Lr_1 := V_Lr_max/(A_e*B_max_Lr*4.44*f_r) = 16.3016
# Number of turns (2)
N_Lr_2 := L_r*I_Lr_peak(1)/(B_max_Lr*A_e) = 6.48652
# Choose number of turns
N_Lr := 10
# Center leg airgap
l_gap_Lr := N_Lr^2*A_e*μ_0/L_r = 1.50796 mm
# Max primary turns per layer
N_turns_Lr := H_b/D_Litz_Lr = 12.9257  # 2 turns x 5 layers
# Cross section area
A_Lr := A_pri = 0.65095 mm^2
# Operating current density
J_Lr := J_pri = 8.45532 A/mm^2
# Mean length turn
MLT_Lr := MLT = 72.8849 mm
# Wire length
l_Lr := N_Lr*MLT_Lr = 0.728849 m
# Wire DC resistance
R_Lr := ρ_Cu(25)*l_Lr/A_Lr = 0.0197085 Ω
# Primary copper loss
P_Lr_Cu(load) := I_Lr_rms(load)^2*R_Lr
P_Lr_Cu(1) = 0.597047 W
# Window utilization factor
K_u_Lr := (A_Lr*N_Lr)/A_w_Lr = 0.0533705
# Resonant choke core loss
# Operating magnetic flux density
B_max_oper_Lr(load) := L_r*I_pri_rms(load)/(N_Lr*A_e)
B_max_oper_Lr(1) = 0.0458666 T
P_v_KF9(load) := 0.0167*(f_sw/Hz)^1.84*(B_max_oper_Lr(load)/(1 T))^2.923 W/m^3
# Core loss density
P_v_Lr(load) := P_v_KF9(load)
# Core loss
P_Lr_core(load) := P_v_Lr(load)*V_e_Lr
P_Lr_core(1) = 0.0239609 W
# Resonant choke loss
# Total loss
P_Lr(load) := P_Lr_Cu(load) + P_Lr_core(load)
P_Lr(1) = 0.621008 W
# LLC Losses
# Loss components | Loss components' captions
P_loss_elements(load) := [
    P_pri(load);
    P_sr(load);
    P_co(load);
    P_connector(load);
    P_sense(load);
    P_oring(load);
    P_tr(load);
    P_Lr(load)
]
P_losses_caption := ["Primary MOSFET"; "SR MOSFET"; "Output cap"; "Connector"; "Sense resistor"; "ORing"; "Transformer"; "Choke"]
# LLC total loss
P_LLC_loss_total(load) := sum(P_loss_elements(load))
# LLC efficiency
eff_LLC(load) := load*P_out_nom/W/(load*P_out_nom/W + P_LLC_loss_total(load)/W)
# Redeclare loss components | Redeclare loss components' captions
P_loss_elements(load) := [
    load;
    P_pri(load);
    P_sr(load);
    P_co(load);
    P_choke(load);
    P_connector(load);
    P_sense(load);
    P_oring(load);
    P_tr(load);
    P_Lr(load);
    P_LLC_loss_total(load);
    eff_LLC(load)
]
P_losses_caption := ["Load"; "Primary MOSFET"; "SR MOSFET"; "Output cap"; "Output choke"; "Connector"; "Sense resistor"; "ORing"; "Transformer"; "Choke"; "Total"; "Efficiency"]
# Table of LLC losses
P_loss_table[:, 0] := P_losses_caption
P_loss_table[:, 1] := P_loss_elements(0.1)
P_loss_table[:, 2] := P_loss_elements(0.2)
P_loss_table[:, 3] := P_loss_elements(0.5)
P_loss_table[:, 4] := P_loss_elements(1.0)
P_loss_table = [
    "Load", 0.1, 0.2, 0.5, 1;
    "Primary MOSFET", 1.46638 W, 1.47864 W, 1.56148 W, 1.84271 W;
    "SR MOSFET", 0.0975523 W, 0.137134 W, 0.414202 W, 1.40373 W;
    "Output cap", 0.00129972 W, 0.00519888 W, 0.032493 W, 0.129972 W;
    "Output choke", 0.300001 W, 0.300002 W, 0.300015 W, 0.300059 W;
    "Connector", 0.0222222 W, 0.0444444 W, 0.111111 W, 0.222222 W;
    "Sense resistor", 0.00138889 W, 0.00555556 W, 0.0347222 W, 0.138889 W;
    "ORing", 0.00555556 W, 0.0222222 W, 0.138889 W, 0.555556 W;
    "Transformer", 3.09399 W, 3.11977 W, 3.29074 W, 3.88791 W;
    "Choke", 0.423054 W, 0.4292 W, 0.471315 W, 0.621008 W;
    "Total", 5.11145 W, 5.24216 W, 6.05496 W, 8.802 W;
    "Efficiency", 0.921497, 0.958144, 0.980216, 0.985542
]
# [plot: eff_LLC(load) vs load]
# Minimum load to find peak efficiency
load_min := 0.01
# Maximum load to find peak efficiency
load_max := 1
# Starting load to find peak efficiency
load_guess := 0.5
solve block
    # guess values
    eff(load) := load*P_out_nom/W/(load*P_out_nom/W + P_LLC_loss_total(load)/W)
    # constraints
    load_min ≤ load_guess ≤ load_max
    # solver
    load_eff_max := maximize(eff, load_guess) = 1
end solve block
# Peak efficiency
eff_max := eff_LLC(load_eff_max) = 0.985542
check(eff_max, 0.975) = "PASS"
# Aux and Fan Losses (estimate only)
# Auxiliary Supply
# Standby voltages
V_aux1 := 5 V
# ER4242
# Lite-On PN: 824067
V_aux2 := 12 V
V_aux3 := 12 V
# Standby current
I_aux1 := 2 A
I_aux2 := 0.3 A
I_aux3 := 0.3 A
# Estimated efficiency
eff_aux := 0.9
# Estimated losses
P_aux(load) := 0.5 W + (V_aux1*I_aux1 + V_aux2*I_aux2 + V_aux3*I_aux3)*load*(1 - eff_aux)
P_aux(1) = 2.22 W
# Fan Power
# Fan power
P_fan_rated := 3 W
# Fan losses
P_fan(load) := P_fan_rated*load
P_fan(1) = 3 W
# 600W PSU Overall Losses
# Total losses
P_PSU_LL_total(load) := P_PFC_LL_total(load) + P_LLC_loss_total(load) + P_aux(load) + P_fan(load)
P_PSU_HL_total(load) := P_PFC_HL_total(load) + P_LLC_loss_total(load) + P_aux(load) + P_fan(load)
# LLC efficiency
eff_PSU_LL_total(load) := load*P_out_nom/W/(load*P_out_nom/W + P_PSU_LL_total(load)/W)
eff_PSU_HL_total(load) := load*P_out_nom/W/(load*P_out_nom/W + P_PSU_HL_total(load)/W)
# Low-line loss components | High-line loss components
P_loss_comp_LL_total(load) := [
    load*W;
    P_relay_LL(load);
    P_bridge_LL(load);
    P_diode(load);
    P_PFC_MOSFET_LL(load);
    P_PFC_choke_LL(load);
    P_emi1_LL(load);
    P_emi2_LL(load);
    P_pri(load);
    P_sr(load);
    P_co(load);
    P_choke(load);
    P_connector(load);
    P_sense(load);
    P_oring(load);
    P_tr(load);
    P_Lr(load);
    P_aux(load);
    P_fan(load);
    P_PSU_LL_total(load);
    eff_PSU_LL_total(load)*W
]
P_loss_comp_HL_total(load) := [
    load*W;
    P_relay_HL(load);
    P_bridge_HL(load);
    P_diode(load);
    P_PFC_MOSFET_HL(load);
    P_PFC_choke_HL(load);
    P_emi1_HL(load);
    P_emi2_HL(load);
    P_pri(load);
    P_sr(load);
    P_co(load);
    P_choke(load);
    P_connector(load);
    P_sense(load);
    P_oring(load);
    P_tr(load);
    P_Lr(load);
    P_aux(load);
    P_fan(load);
    P_PSU_HL_total(load);
    eff_PSU_HL_total(load)*W
]
P_loss_comp_LL_total(load) := P_loss_comp_LL_total(load)/W
P_loss_comp_HL_total(load) := P_loss_comp_HL_total(load)/W
# Captions
P_losses_total_caption := ["Load"; "Relay"; "Bridge diode"; "Boost diode"; "PFC MOSFET"; "PFC choke"; "EMI choke 1"; "EMI choke 2"; "Primary MOSFET"; "SR MOSFET"; "Output cap"; "Output choke"; "Connector"; "Sense resistor"; "ORing"; "Transformer"; "Resonant Choke"; "Aux"; "Fan"; "Total losses"; "Efficiency"]
# Table of total losses at low-line
P_loss_table_LL_total[:, 0] := P_losses_total_caption
P_loss_table_LL_total[:, 1] := P_loss_comp_LL_total(0.1)
P_loss_table_LL_total[:, 2] := P_loss_comp_LL_total(0.2)
P_loss_table_LL_total[:, 3] := P_loss_comp_LL_total(0.3)
P_loss_table_LL_total[:, 4] := P_loss_comp_LL_total(0.4)
P_loss_table_LL_total[:, 5] := P_loss_comp_LL_total(0.5)
P_loss_table_LL_total[:, 6] := P_loss_comp_LL_total(0.6)
P_loss_table_LL_total[:, 7] := P_loss_comp_LL_total(0.7)
P_loss_table_LL_total[:, 8] := P_loss_comp_LL_total(0.8)
P_loss_table_LL_total[:, 9] := P_loss_comp_LL_total(0.9)
P_loss_table_LL_total[:, 10] := P_loss_comp_LL_total(1)
# Table of total losses at high-line
P_loss_table_HL_total[:, 0] := P_losses_total_caption
P_loss_table_HL_total[:, 1] := P_loss_comp_HL_total(0.1)
P_loss_table_HL_total[:, 2] := P_loss_comp_HL_total(0.2)
P_loss_table_HL_total[:, 3] := P_loss_comp_HL_total(0.3)
P_loss_table_HL_total[:, 4] := P_loss_comp_HL_total(0.4)
P_loss_table_HL_total[:, 5] := P_loss_comp_HL_total(0.5)
P_loss_table_HL_total[:, 6] := P_loss_comp_HL_total(0.6)
P_loss_table_HL_total[:, 7] := P_loss_comp_HL_total(0.7)
P_loss_table_HL_total[:, 8] := P_loss_comp_HL_total(0.8)
P_loss_table_HL_total[:, 9] := P_loss_comp_HL_total(0.9)
P_loss_table_HL_total[:, 10] := P_loss_comp_HL_total(1)
# Total losses at low-line
P_loss_table_LL_total = [
    "Load", 0.1, 0.2, 0.3, 0.4, 0.5, 0.6, 0.7, 0.8, 0.9, 1;
    "Relay", 0.00132843, 0.00531371, 0.0119559, 0.0212549, 0.0332107, 0.0478234, 0.065093, 0.0850194, 0.107603, 0.132843;
    "Bridge diode", 1.08601, 2.17202, 3.25804, 4.34405, 5.43006, 6.51607, 7.60208, 8.68809, 9.77411, 10.8601;
    "Boost diode", 0.306122, 0.612245, 0.918367, 1.22449, 1.53061, 1.83673, 2.14286, 2.44898, 2.7551, 3.06122;
    "PFC MOSFET", 1.23282, 1.73171, 2.27369, 2.85874, 3.48688, 4.15809, 4.87238, 5.62976, 6.43021, 7.27374;
    "PFC choke", 0.150918, 0.287551, 0.515273, 0.834083, 1.24398, 1.74497, 2.33705, 3.02021, 3.79447, 4.65981;
    "EMI choke 1", 0.0103727, 0.0414909, 0.0933545, 0.165964, 0.259318, 0.373418, 0.508263, 0.663854, 0.84019, 1.03727;
    "EMI choke 2", 0.0103727, 0.0414909, 0.0933545, 0.165964, 0.259318, 0.373418, 0.508263, 0.663854, 0.84019, 1.03727;
    "Primary MOSFET", 1.46638, 1.47864, 1.49866, 1.52633, 1.56148, 1.60394, 1.65351, 1.70997, 1.7731, 1.84271;
    "SR MOSFET", 0.0975523, 0.137134, 0.203102, 0.295458, 0.414202, 0.559333, 0.730852, 0.928758, 1.15305, 1.40373;
    "Output cap", 0.00129972, 0.00519888, 0.0116975, 0.0207955, 0.032493, 0.0467899, 0.0636863, 0.0831821, 0.105277, 0.129972;
    "Output choke", 0.300001, 0.300002, 0.300005, 0.30001, 0.300015, 0.300021, 0.300029, 0.300038, 0.300048, 0.300059;
    "Connector", 0.0222222, 0.0444444, 0.0666667, 0.0888889, 0.111111, 0.133333, 0.155556, 0.177778, 0.2, 0.222222;
    "Sense resistor", 0.00138889, 0.00555556, 0.0125, 0.0222222, 0.0347222, 0.05, 0.0680556, 0.0888889, 0.1125, 0.138889;
    "ORing", 0.00555556, 0.0222222, 0.05, 0.0888889, 0.138889, 0.2, 0.272222, 0.355556, 0.45, 0.555556;
    "Transformer", 3.09399, 3.11977, 3.16115, 3.21814, 3.29074, 3.37896, 3.48278, 3.60221, 3.73726, 3.88791;
    "Resonant Choke", 0.423054, 0.4292, 0.439288, 0.453324, 0.471315, 0.493272, 0.519206, 0.54913, 0.583059, 0.621008;
    "Aux", 0.672, 0.844, 1.016, 1.188, 1.36, 1.532, 1.704, 1.876, 2.048, 2.22;
    "Fan", 0.3, 0.6, 0.9, 1.2, 1.5, 1.8, 2.1, 2.4, 2.7, 3;
    "Total losses", 8.73047, 11.2904, 14.0078, 16.8825, 19.9144, 23.1032, 26.4488, 29.951, 33.6096, 37.4245;
    "Efficiency", 0.872975, 0.914004, 0.927798, 0.934279, 0.937751, 0.939695, 0.940757, 0.941267, 0.941407, 0.941288
]
# [plot: eff_PSU_LL_total(load) vs load]
# Total losses at high-line
P_loss_table_HL_total = [
    "Load", 0.1, 0.2, 0.3, 0.4, 0.5, 0.6, 0.7, 0.8, 0.9, 1;
    "Relay", 0.00051982, 0.00207928, 0.00467838, 0.00831712, 0.0129955, 0.0187135, 0.0254712, 0.0332685, 0.0421054, 0.051982;
    "Bridge diode", 0.424961, 0.849922, 1.27488, 1.69984, 2.12481, 2.54977, 2.97473, 3.39969, 3.82465, 4.24961;
    "Boost diode", 0.306122, 0.612245, 0.918367, 1.22449, 1.53061, 1.83673, 2.14286, 2.44898, 2.7551, 3.06122;
    "PFC MOSFET", 0.948334, 1.12247, 1.2994, 1.47913, 1.66166, 1.84699, 2.03513, 2.22605, 2.41978, 2.61631;
    "PFC choke", 0.289567, 0.310488, 0.345357, 0.394173, 0.456936, 0.533647, 0.624305, 0.728911, 0.847464, 0.979965;
    "EMI choke 1", 0.00158826, 0.00635305, 0.0142944, 0.0254122, 0.0397065, 0.0571774, 0.0778248, 0.101649, 0.128649, 0.158826;
    "EMI choke 2", 0.00158826, 0.00635305, 0.0142944, 0.0254122, 0.0397065, 0.0571774, 0.0778248, 0.101649, 0.128649, 0.158826;
    "Primary MOSFET", 1.46638, 1.47864, 1.49866, 1.52633, 1.56148, 1.60394, 1.65351, 1.70997, 1.7731, 1.84271;
    "SR MOSFET", 0.0975523, 0.137134, 0.203102, 0.295458, 0.414202, 0.559333, 0.730852, 0.928758, 1.15305, 1.40373;
    "Output cap", 0.00129972, 0.00519888, 0.0116975, 0.0207955, 0.032493, 0.0467899, 0.0636863, 0.0831821, 0.105277, 0.129972;
    "Output choke", 0.300001, 0.300002, 0.300005, 0.30001, 0.300015, 0.300021, 0.300029, 0.300038, 0.300048, 0.300059;
    "Connector", 0.0222222, 0.0444444, 0.0666667, 0.0888889, 0.111111, 0.133333, 0.155556, 0.177778, 0.2, 0.222222;
    "Sense resistor", 0.00138889, 0.00555556, 0.0125, 0.0222222, 0.0347222, 0.05, 0.0680556, 0.0888889, 0.1125, 0.138889;
    "ORing", 0.00555556, 0.0222222, 0.05, 0.0888889, 0.138889, 0.2, 0.272222, 0.355556, 0.45, 0.555556;
    "Transformer", 3.09399, 3.11977, 3.16115, 3.21814, 3.29074, 3.37896, 3.48278, 3.60221, 3.73726, 3.88791;
    "Resonant Choke", 0.423054, 0.4292, 0.439288, 0.453324, 0.471315, 0.493272, 0.519206, 0.54913, 0.583059, 0.621008;
    "Aux", 0.672, 0.844, 1.016, 1.188, 1.36, 1.532, 1.704, 1.876, 2.048, 2.22;
    "Fan", 0.3, 0.6, 0.9, 1.2, 1.5, 1.8, 2.1, 2.4, 2.7, 3;
    "Total losses", 7.76737, 9.28881, 10.8923, 12.5776, 14.3447, 16.1933, 18.1233, 20.1345, 22.2267, 24.3996;
    "Efficiency", 0.885382, 0.928155, 0.94294, 0.950203, 0.954366, 0.956955, 0.958634, 0.959742, 0.960467, 0.960923
]
# [plot: eff_PSU_HL_total(load) vs load]
# Export to Excel
filename_LL := "LL_losses.xlsx"
data_LL := P_loss_table_LL_total
test := WRITEEXCEL(filename_LL, data_LL)
filename_HL := "HL_losses.xlsx"
data_HL := P_loss_table_HL_total
test := WRITEEXCEL(filename_HL, data_HL)
# PSU Efficiency
eff_PSU_LL_total(0.1) = 0.872975
eff_PSU_HL_total(0.1) = 0.885382
eff_PSU_LL_total(0.2) = 0.914004
eff_PSU_HL_total(0.2) = 0.928155
eff_PSU_LL_total(0.5) = 0.937751
eff_PSU_HL_total(0.5) = 0.954366
eff_PSU_LL_total(1) = 0.941288
eff_PSU_HL_total(1) = 0.960923
# Check if efficiency is met
check(eff_PSU_LL_total(0.5), 0.94) = "FAIL"
eff_PSU_LL_total(0.5) = 0.937751
check(eff_PSU_LL_total(1), 0.92) = "PASS"
eff_PSU_LL_total(1) = 0.941288
check(eff_PSU_HL_total(0.5), 0.94) = "PASS"
eff_PSU_HL_total(0.5) = 0.954366
check(eff_PSU_HL_total(1), 0.92) = "PASS"
eff_PSU_HL_total(1) = 0.960923
