# OUTPUT FILTER SECTION
ORIGIN := 1
index := 1 .. 125
f[index] := 1 Hz*1.1^(index - 1)
s := 1j*2*π*f
Iin := 8.333 A
Rp := 8*10^-3 Ω
Cp := 2200 μF
L := 5 μH
Ce := 560 μF
Re := 100*10^-3 Ω
Rl := 12 V/Iin = 1.44006 Ω
Zp := Rp + 1/(s*Cp)
Zl := s*L
Ze := Re + 1/(s*Ce)
Zo := Rl*Ze/(Ze + Rl)
Za' := Zl + Zo
Za := vectorize(Zp*Za')/(Zp + Za')
Va := Iin*Za
Il := Va/Za'
Vo := vectorize(Il*Zo)
Vo_r := sqrt(Re(Vo)^2 + Im(Vo)^2)
Hangle := 180/π*arg(Vo)
Gdb := 20*log(Vo_r/(1 V))
# [plot: Gdb, Hangle vs f (Hz)]
# FIRST POLE
f1 := 1/(2*π*Rl*Cp) = 50.2363 Hz
# 2ND POLE
f2 := 1/(2*π*sqrt(L*Ce)) = 3.00775 kHz
# MAKE switching >> f2 >> crossover
# COMPENSATION SECTION
Ru := 100 KΩ
Vref := 2.5 V
Vo := 12 V
Rl := Ru*(Vref/(Vo - Vref)) = 26.3158 KΩ
# CHECK LED DROP, CTR and DARK CURRENT ON SPECS!!
Vled := 1.2 V
CTR := 1.20
# SET TARGET COMPENSATION VOLTAGE BETWEEN Vo and Vo/2
Vcomp_fresh := 0.8*Vo = 9.6 V
Vcomp_old := 0.8*Vcomp_fresh = 7.68 V
# SET CTRL LEVEL NEAR MIDDLE OF 0.77V and 4.9V see TEA1755 specs.
Vfbctrl := 2.835 V  # (Can be increased to lessen standby loss in 48V output)
# SET END OF LIFE OF OPTOCOUPLER
EOLopto := 0.1
Ice_min := 2.5 mA
Ice_max := 30 mA
Ifbctrl := (7 V - Vfbctrl)/(13.2 KΩ) + 29 μA = 0.34453 mA
Loss := 7 V*Ifbctrl = 0.00241171 W
Iled_fresh := Ifbctrl/CTR = 0.287109 mA
Iled_old := Ifbctrl/(EOLopto*CTR) = 2.87109 mA
# COMPUTE LED BIAS RESISTORS
Rled := (Vcomp_fresh - Vcomp_old)/(Iled_old - Iled_fresh) = 0.743041 KΩ
Rb := Rled*Vled/(Vo - Vled - Vcomp_fresh - Iled_fresh*Rled) = 0.903698 KΩ
# COMPUTE POWER LOSS
Icomp := Vo*((Vo - Vcomp_fresh)/Rled) = 0.0387597 W
# SET COMPENSATION COMPONENTS (Set Fz result near f1)
Cz := 30 nF
Rz := 100 KΩ
Fz := 1/(2*π*Rz*Cz) = 53.0516 Hz
Zz := Rz + 1/(s*Cz)
Vcomp := -vectorize(Va*Zz)/Ru
Mag_comp := sqrt(Re(Vcomp)^2 + Im(Vcomp)^2)  # This will be used in the next plot
Gcomp_db := 20*log(Mag_comp/Vo)
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# COMPUTE OPTOCOUPLER INTERNAL CAPACITANCE BASED ON BANDWIDTH
Co_int := 1/(2*π*13.2 KΩ*80 KHz) = 0.150715 nF  # NEED ACTUAL MEASUREMENT
# SET COMPENSATION POLE CAP (AFTER OPTO SECTION)
Cfb := 100 pF
Zfb := 1/(s*(Cfb + Co_int))
Rfb := 13.2 KΩ
Vfb := 7 V
Fb := 1/(2*π*Rfb*(Cfb + Co_int)) = 48091.2 Hz
Iled := (vectorize(Va*(1 + Zz/Ru)) - Vled)/Rled - Vled/Rb
Ifb := Iled*CTR
Vfbctrl := (7 V/Rfb + 29 μA - Ifb)/(1/Zfb + 1/Rfb)
Mag_fbctrl := sqrt(Re(Vfbctrl)^2 + Im(Vfbctrl)^2)
Gdb_fbctrl := 20*log(Mag_fbctrl/(12 V))
# [plot: Gdb_fbctrl, Gcomp_db vs f (Hz)]
# CLOSE LOOP TRANSFER FUNCTION
H := vectorize(Vfbctrl/(12 V)*Va/(1 V))
Hmag := sqrt(Re(H)^2 + Im(H)^2)
Hangle := 180/π*arg(H)
Hdb := 20*log(Hmag)
# [plot: Hdb, Hangle vs f (Hz)]
