# CrCM Flyback Transformer design
# Reference: https://www.fujielectric.com/products/semiconductor/model/power_supply/technical/fly-back_transformer_design.html
# Determine Flyback voltage
Vr := 40 V
# Determine Ringing voltage
Vsgm := 100 V
# Determine Minimum and Maximum DC bus, corresponding frequency
Vbulk_min := 228 V
Vbulk_max := 391 V
Fsw_min := 32 kHz
Fsw_max := 67 kHz
# Determine Duty and Primary inductance
Duty_min := Vr/(Vbulk_max + Vr) = 0.0928074
Ton_min := Duty_min/Fsw_max = 1.38519e-6 s
Duty_max := Vr/(Vbulk_min + Vr) = 0.149254
Ton_max := Duty_max/Fsw_min = 4.66418e-6 s
Pin := 100 W*1.05 = 105 W
Lp_max := Vbulk_max^2*Ton_min^2*Fsw_max/(2*Pin) = 93.589 μH
Lp_min := Vbulk_min^2*Ton_max^2*Fsw_min/(2*Pin) = 172.326 μH
# Calculate max current at primary side
Ipeak := Vbulk_min*Ton_max/Lp_min = 6.17105 A
