# Flyback Transformer Design
# Reference:ON SEMI AN-4137
# Base DC from MOSFET Vds
DC := 0.255  # Design:353uH
Vbulk_min := 228 V
Vbulk_max := 390 V
Vds_min := Vbulk_min*(1 + DC/(1 - DC)) = 306.04 V
Vds_max := Vbulk_max*(1 + DC/(1 - DC)) = 523.49 V
# Determin Inductance at minimum voltage and full load
Poverload := 150 W
Fsw_min := 32 kHz
Lm := (Vbulk_min*DC)^2/(2*Poverload*Fsw_min) = 352.11 μH
Fsw_max := (Vbulk_max*DC)^2/(2*Poverload*Lm) = 93.6288 kHz
# Determine max and rms current of MOSFET
Pnom := 105 W
Iedc := Pnom/(Vds_min*DC) = 1.34546 A
I_delta := Vds_min*DC/(Lm*Fsw_min) = 6.92612 A
