# LLC Primary Side
Fs := 65.27 kHz
Lm := 300 μH
Lr := 37 μH
Cr := 80 nF
P := 600 W
Eff := 0.97
Vin := 400 V
N := 5.33
Vo := 43.2 V
w := 2*π*Fs
s := 1j*w
Vpri_pk := Vin/2 = 200 V  # Peak voltage for half bridge LLC
Pt := P/Eff = 618.557 W
Rac := Vo^2*N^2/Pt = 85.7122 Ω
Irs := Pt/(0.45*Vin) = 3.43643 A  # Full Load Primary Resonant Current
# (-0.05V allowance for dead time)
ORIGIN := 1
index := 1 .. 10000
f[index] := 1 Hz*1.01^index
sx := 1j*2*π*f
Zm := vectorize(Rac*sx*Lm)/(Rac + sx*Lm)  # Impedance of Tx primary with load
Zt := 1/(sx*Cr) + sx*Lr + Zm  # Total tank impedance
Vm := Vin/2*Zm/Zt
Vmag := vectorize(|Vm|)
Gain := 20*log(Vmag/Vin)
# [chart]
    X[1] := f
    Y[1] := Gain
TOL := 0.01  # Adjust the tolerance so that the Fx returns just 1 value
Vmax := max(Vmag) = 319.735 V
Xindex := match(Vmax, Vmag) = [1051]
Fx := f(||Xindex|| - 1) = 34.8148 kHz  # Capacitive/Inductive Frequency boundary
Fas := 39 KHz
sx := 1j*2*π*Fas
Zm := Rac*sx*Lm/(Rac + sx*Lm)
Zt := 1/(sx*Cr) + sx*Lr + Zm
Vhold_min := 261 V
# Adjust this value so that Vo_x below is equal to the output
# voltage
Vm := Vhold_min/2*Zm/Zt
Vm = (132.206 + 150.658i) V
Iac := Vm/Rac
Isec := N*Iac
# LLC Secondary Side
C1 := 300 μF
Resr1 := 6.67*10^-3 Ω  # 1st Stage Filter
# 8A0BRD NCC HHSE630ETD101MJC5S 63V 100uF 3.4A 20m 10x12.5  (x4)
# ALTERNATE: KEMET A759MX447M1HAAE028 50V 440uF 6.01A .28m 10x18 (x3)
L2 := 0.000 μH
C2 := 100 μF
Resr2 := 20*10^-3 Ω  # 2nd Stage Filter
# 8A0BRD NCC HHSE630ETD101MJC5S 63V 100uF 3.4A 20m 10x12.5  (x1)
Vsec_pk := 2*Vpri_pk/N = 75.0469 V  # Peak Voltage across Rectifier
Isec := Irs*N = 18.3162 A  # Full Load Tx Secondary Current (Sum current of rectifiers)
Isec_pk := Isec*sqrt(2) = 25.9029 A  # Peak Current through the Rectifier
Iload := P/Vo = 13.8889 A  # Full load Output current
I1st := sqrt(Isec^2 - Iload^2) = 11.9407 A  # 1st Stage Filter Capacitor Ripple Current
Loss_cap1 := I1st^2*Resr1 = 0.95101 W  # 1st Stage Filter Capacitor Power Loss
w := 2*π*(Fs*2)
s := 1j*w  # Note: The frequency is doubled at secondary side
Rl := Vo^2/P = 3.1104 Ω  # Load Resistance
Zc2 := Resr2 + 1/(s*C2) = (0.02 - 0.012192i) Ω  # 2nd Stage Cap impedance
Zc2l := Rl*Zc2/(Rl + Zc2) = (0.0199191 - 0.0120366i) Ω  # Output impedance ( Load||C2)
Z2 := Zc2l + s*L2 = (0.0199191 - 0.0120366i) Ω  # 2nd Stage Impedance (L2+Load||C2)
Zc1 := Resr1 + 1/(s*C1) = (0.00667 - 0.00406401i) Ω  # 1st Stage Cap Impedance
Zo := Zc1*Z2/(Z2 + Zc1) = (0.00499682 - 0.00303823i) Ω  # Total Output Impedance
Vac_1 := Isec*Zo = (0.0915224 - 0.0556487i) V  # Voltage across 1st Stage Filter
Vo_ripple := Vac_1*Zc2l/Z2 = (0.0915224 - 0.0556487i) V
Vo_ripple_rms := |Vo_ripple| = 0.107113 V
Vo_pk := Vo_ripple_rms*sqrt(2) = 151.48 mV  # Pk-Pk Ripple voltage
