# LLC Primary Side
Fs := 100 kHz
Lm := 302 μH
Lr := 37 μH
Cr := 50 nF
P := 600 W
Eff := 0.95
Vin := 380 V
N := 5.333
Vo := 36 V
w := 2*π*Fs
s := 1j*w
Vpri_pk := Vin/2 = 190 V  # Peak voltage for half bridge LLC
Pt := P/Eff = 631.579 W
Irs := Pt/(0.45*Vin) = 3.69344 A  # Full Load Primary Resonant Current
# (-0.05V allowance for dead time)
# LLC Secondary Side
C1 := 2200 μF
Resr1 := 10*10^-3 Ω  # 1st Stage Filter
# Get Actual Part number
L2 := 0.59 μH
C2 := 681 μF
Resr2 := 50*10^-3 Ω  # 2nd Stage Filter
# Get Actual Part number
Vsec_pk := 2*Vpri_pk/N = 71.2545 V  # Peak Voltage across Rectifier
Isec := Irs*N = 19.6971 A  # Full Load Tx Secondary Current (Sum current of rectifiers)
Isec_pk := Isec*sqrt(2) = 27.856 A  # Peak Current through the Rectifier
Iload := P/Vo = 16.6667 A  # Full load Output current
I1st := sqrt(Isec^2 - Iload^2) = 10.4976 A  # 1st Stage Filter Capacitor Ripple Current
Loss_cap1 := I1st^2*Resr1 = 1.10199 W  # 1st Stage Filter Capacitor Power Loss
w := 2*π*(Fs*2)
s := 1j*w  # Note: The frequency is doubled at secondary side
Rl := Vo^2/P = 2.16 Ω  # Load Resistance
Zc2 := Resr2 + 1/(s*C2) = (0.05 - 0.00116854i) Ω  # 2nd Stage Cap impedance
Zc2l := Rl*Zc2/(Rl + Zc2) = (0.0488694 - 0.00111626i) Ω  # Output impedance ( Load||C2)
Z2 := Zc2l + s*L2 = (0.0488694 + 0.7403i) Ω  # 2nd Stage Impedance (L2+Load||C2)
Zc1 := Resr1 + 1/(s*C1) = (0.01 - 0.000361716i) Ω  # 1st Stage Cap Impedance
Zo := Zc1*Z2/(Z2 + Zc1) = (0.00999904 - 0.000226822i) Ω  # Total Output Impedance
Vac_1 := Isec*Zo = (0.196953 - 0.00446775i) V  # Voltage across 1st Stage Filter
Vo_ripple := Vac_1*Zc2l/Z2 = (0.00026476 - 0.0129772i) V
Vo_ripple_rms := |Vo_ripple| = 0.0129799 V
Vo_pk := Vo_ripple_rms*sqrt(2) = 18.3564 mV  # Pk-Pk Ripple voltage
