# 12V output
# GUIDE TO THIS FILE:
# 1. Blue - Your input parameter options
# 2. Red - Important results
# 1st Stage Cap: NCC APSG160E__222MJ20S 16V 2200uF 8.1A 8m 10x20 20000hrs/105℃
# 2nd Stage Cap: Rubycon 25ZLH560MEFCTA8X20 16V 560uF 1.5A  29m 8x9 2000hrs/105℃
Vbulk_min := 300 V
Lp_gapped := 320.6 μH
Io_nom := 8.33 A
Vo := 12 V
Vf := 0.1 V
N := 7
Po := 100 W
Cpol := 2200 μF
ESR := 8*10^-3 Ω
Lout := 3.7 μH
Celec := 560 μF
ESR2 := 29*10^-3 Ω
Eff := 0.95
Tvalley := 1.1 μs
Lsec := Lp_gapped/N^2 = 6.54286 μH
Fx := 1.78 KHz
F1 := 1/(2*π*(Vo/Io_nom)*Cpol) = 50.2182 Hz  # 1st Stage Filter Resonant Frequency
F2 := 1/(2*π*sqrt(Lout*Celec)) = 3.49643 kHz  # 2nd Stage Filter Resonant Frequency
a := N*Vbulk_min*Lp_gapped = 0.67326 kg^2*m^4/(s^5*A^3)
b := -2*Io_nom*Lp_gapped*(N*(Vo + Vf) + Vbulk_min) = -2.05476 kg^2*m^4/(s^5*A^2)
c := -2*Io_nom*1*Tvalley*N*Vbulk_min*(Vo + Vf) = -0.465664 kg^2*m^4/(s^5*A)
Ipk_max := (-b + sqrt((b^2 - 4*a*c)))/(2*a) = 3.26387 A
Ipk_secondary := Ipk_max*N = 22.8471 A
Fsw := Po*2/(Lp_gapped*Ipk_max^2*Eff) = 61.6422 kHz  # SWITCHING FREQUENCY
# What is the Fsw in in the simulation result? 60KHz
Ton := Ipk_max*Lp_gapped/Vbulk_min = 3.48798 μs
Toff := 1/Fsw - Ton = 12.7347 μs
Tsec_pk := Ipk_secondary*Lp_gapped/(N^2*(Vo + Vf)) = 12.3541 μs
Dsec := Tsec_pk*Fsw = 0.761536
Isec_rms := Ipk_secondary*sqrt(Dsec/3) = 11.5111 A  # FORMULA REFERENCE: Vishay AN730
Ipol_rms := sqrt(Isec_rms^2 - Io_nom^2) = 7.94452 A  # POLYCAP RIPPLE CURRENT
# What is the 1st stage capacitor ripple current in the simulation? 7.5A
Vpoly_ripple := Ipk_secondary*sqrt(ESR^2 + (1/(2*π*Fsw*Cpol))^2) = 184.733 mV
w := 2*π*Fsw
Rl := Vo/Io_nom = 1.44058 Ω
Mag_upper := sqrt(1 + (w*ESR2*Celec)^2) = 6.3689
Real_lower := Rl - w^2*Lout*Celec*(Rl + ESR2) = -455.33 Ω
Imag_lower := w*(ESR*Rl*Celec + Lout) = 3.93266 Ω
Mag_lower := sqrt(Real_lower^2 + Imag_lower^2) = 455.347 Ω
Vout_ripple := Vpoly_ripple*Rl*Mag_upper/Mag_lower = 3.72222 mV  # OUTPUT RIPPLE VOLTAGE
# What is the output ripple specification? 120mV
# What is the output ripple in the simulation result? 3.9mV
# OUTPUT FILTER TRANSFER FUNCTION
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ORIGIN := 1
index := 1 .. 100
f[index] := 1 Hz*1.15^index
s := 1j*2*π*f
# POLYCAP Impedance | INDUCTOR Impedance | ECAP Impedance
Zp := ESR + 1/(s*Cpol)
Zl := s*Lout
Ze := ESR2 + 1/(s*Celec)
# Combined Impedance of ECAP and Load
Zeload := Ze*(Vo/Io_nom)/(Ze + Vo/Io_nom)
# Series Impedance from inductor to load
Zlload := Zl + Zeload
# Total Impedance of output Filter
Zfilter := vectorize(Zp*Zlload)/(Zp + Zlload)
# POLYCAP NODE OUTPUT TRANSFER FUNCTION
Hpol := Io_nom*Zfilter/(1 V)
# OUTPUT TRANSFER FUNCTION
Hout := vectorize(Hpol*Zeload)/Zlload
# FEEDBACK & COMPENSATION
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# SLOW LANE VOLTAGE DIVIDER
Rupper := 51 kΩ
Rlower := 13.421 kΩ
Vsense := Vo*Rlower/(Rupper + Rlower) = 2.49999 V
# Make sure this value is 2.5V before
# proceeding
# COMPENSATION NETWORK
Cint := 0.1 μF
Rint := 30 KΩ
Zint := Rint + 1/(s*Cint)
Hcomp := -vectorize(Hout*Zint)/Rupper
Fzero := 1/(2*π*Rint*Cint) = 53.0516 Hz  # SHOULD MATCH/NEAR THE 1st Stage Filter Resonant Frequency
# FAST LANE
# TYPICAL LIFE OF LED is 10 years at 50%CTR,10mA initial LED current.
Vled := 1.2 V
CTR := 0.35*1.95
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# SET TARGET COMPENSATION VOLTAGE BETWEEN Vo and Vo/2
Vcomp_fresh := Vo - 1.6 V = 10.4 V  # (can be increased to lessen standby loss in 48V output)
Vcomp_old := 0.97*Vcomp_fresh = 10.088 V
# SET IC CTRL LEVEL NEAR MIDDLE OF 0.77V and 4.9V see LTA1201R specs.
Vfbctrl := 3 V
# SET END OF LIFE OF OPTOCOUPLER
EOLopto := 0.5
Vcbias := 7 V
Rcbias := 13.2 KΩ
Ifbctrl := (Vcbias - Vfbctrl)/Rcbias + 29 μA = 0.33203 mA
Loss := Vcbias*Ifbctrl = 0.00232421 W
Iled_fresh := Ifbctrl/CTR = 0.486491 mA
Iled_old := Ifbctrl/(EOLopto*CTR) = 0.972983 mA
# COMPUTE LED BIAS RESISTORS
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Rled := (Vcomp_fresh - Vcomp_old)/(Iled_old - Iled_fresh) = 641.327 Ω  # LTV-1008-G
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Rb := Rled*Vled/(Vo - Vled - Vcomp_fresh - Iled_fresh*Rled) = 8745.37 Ω
Icomp_fresh := Iled_fresh + Vled/Rb = 0.623707 mA
Loss_comp := Vo*Icomp_fresh = 0.00748448 W
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Icomp_old := Iled_old + Vled/Rb = 1.1102 mA
# COMPUTE INTERNAL CAPACITANCE OF OPTO (LTV-817s)
Fopto_cutoff := 80 KHz
Copto := 1/(2*π*Rcbias*Fopto_cutoff) = 0.150715 nF
# OPTO EXTERNAL CAPACITANCE FOR ADDITIONAL POLE COMPENSATION
Copto2 := 47 nF
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# TOTAL OPTO CAPACITOR IMPEDANCE
Zcapopto := 1/(s*(Copto + Copto2))
Hled := (Hpol - Hcomp)/Rled
Hfbctrl := vectorize(-Rcbias*Hled*CTR*Zcapopto)/(Zcapopto + Rcbias)
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# CLOSED LOOP FAST LANE TRANSFER FUNCTION
# Current on LED | Voltage on FBCTRL | OUTPUT
Hled := 1/Rled
Hfbctrl := -Hled*CTR/(1/Rcbias + 1/Zcapopto)
Houtfast := vectorize(Hfbctrl*Hout)
# CLOSED LOOP SLOW LANE TRANSFER FUNCTION
# COMP TF | Current on LED | Voltage on FBCTRL
Hcomp := -Zint/Rupper
Hled := -Hcomp/Rled
Hfbctrl := -Hled*CTR/(1/Rcbias + 1/Zcapopto)
# OUTPUT
Houtslow := vectorize(Hfbctrl*Hout)
# CLOSED LOOP FINAL BODE PLOT (SUPERIMPOSED)
Hbode := Houtfast + Houtslow
Hbodemag := sqrt(Re(Hbode)^2 + Im(Hbode)^2)
Hbodedb := 20*log(Hbodemag)
HbodeA[index] := 180/π*if(Re(Hbode[index]) < 0, atan(Im(Hbode[index])/Re(Hbode[index])) + π, atan(Im(Hbode[index])/Re(Hbode[index])))
# [chart]
    X[1] := f
    X[2] := f
    Y[1] := Hbodedb
    Y[2] := HbodeA
TOL := 0.1  # Increase the tolerance if crossover frequency returns nothing
Xindex := match(0, Hbodedb) = [54]
||Xindex|| = 54
# CROSSOVER FREQUENCY | PHASE MARGIN [°]
Fx := f(||Xindex||) = 2.17962 kHz
θx := 180 + HbodeA(||Xindex||) = 193.385
# LTSPICE VERIFICATION (SUPERIMPOSED IN EXCEL)
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