# 24V output
# GUIDE TO THIS FILE:
# 1. Blue - Your input parameter options
# 2. Red - Important results
# 1st Stage Cap: Rubycon 35PZJ560M10X15 35V 560uF 4.0A 11m 10x15 4000hrs/125℃
# 2nd Stage Cap: Rubycon 35AX150MEFC8X9 35V 150uF 1.36A  49m 8x9 2000hrs/105℃
# What is the primary peak current
Vbulk_min := 300 V
Lp_gapped := 320.6 μH
Io_nom := 4.167 A
Vo := 24 V
Vf := 0.7 V
N := 3.5
Po := 100 W
Cpol := 560 μF
ESR := 11*10^-3 Ω
Lout := 3.7 μH
Celec := 150 μF
ESR2 := 49*10^-3 Ω
Eff := 0.95
Tvalley := 1.1 μs
Lsec := Lp_gapped/N^2 = 26.1714 μH
F1 := 1/(2*π*(Vo/Io_nom)*Cpol) = 49.3451 Hz  # 1st Stage Filter Resonant Frequency
F2 := 1/(2*π*sqrt(Lout*Celec)) = 6.75575 kHz  # 2nd Stage Filter Resonant Frequency
a := N*Vbulk_min*Lp_gapped = 0.33663 kg^2*m^4/(s^5*A^3)
b := -2*Io_nom*Lp_gapped*(N*(Vo + Vf) + Vbulk_min) = -1.03255 kg^2*m^4/(s^5*A^2)
c := -2*Io_nom*1*Tvalley*N*Vbulk_min*(Vo + Vf) = -0.237757 kg^2*m^4/(s^5*A)
Ipk_max := (-b + sqrt((b^2 - 4*a*c)))/(2*a) = 3.28248 A
Ipk_secondary := Ipk_max*N = 11.4887 A
Fsw := Po*2/(Lp_gapped*Ipk_max^2*Eff) = 60.9452 kHz  # SWITCHING FREQUENCY
# What is the Fsw in the simulation?: 62.5KHz
Ton := Ipk_max*Lp_gapped/Vbulk_min = 3.50787 μs
Toff := 1/Fsw - Ton = 12.9003 μs
Tsec_pk := Ipk_secondary*Lp_gapped/(N^2*(Vo + Vf)) = 12.1731 μs
Dsec := Tsec_pk*Fsw = 0.74189
Isec_rms := Ipk_secondary*sqrt(Dsec/3) = 5.71319 A  # FORMULA REFERENCE: Vishay AN730
Ipol_rms := sqrt(Isec_rms^2 - Io_nom^2) = 3.90854 A  # 1st stage RIPPLE CURRENT
# What is the 1st stage capacitor ripple current in the simulation?: 3.72A
Vpoly_ripple := Ipk_secondary*sqrt(ESR^2 + (1/(2*π*Fsw*Cpol))^2) = 137.263 mV
w := 2*π*Fsw
Rl := Vo/Io_nom = 5.75954 Ω
Mag_upper := sqrt(1 + (w*ESR2*Celec)^2) = 2.98691
Real_lower := Rl - w^2*Lout*Celec*(Rl + ESR2) = -466.955 Ω
Imag_lower := w*(ESR*Rl*Celec + Lout) = 5.05592 Ω
Mag_lower := sqrt(Real_lower^2 + Imag_lower^2) = 466.982 Ω
Vout_ripple := Vpoly_ripple*Rl*Mag_upper/Mag_lower = 5.05663 mV  # OUTPUT RIPPLE VOLTAGE
# What is the output ripple specification?
Vr_spec := 160 mV
# What is the output ripple in the simulation?: 5.6mV
# OUTPUT FILTER TRANSFER FUNCTION
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ORIGIN := 1
index := 1 .. 100
f[index] := 1 Hz*1.15^index
s := 1j*2*π*f
# POLYCAP Impedance | INDUCTOR Impedance | ECAP Impedance
Zp := ESR + 1/(s*Cpol)
Zl := s*Lout
Ze := ESR2 + 1/(s*Celec)
# Combined Impedance of ECAP and Load
Zeload := Ze*(Vo/Io_nom)/(Ze + Vo/Io_nom)
# Series Impedance from inductor to load
Zlload := Zl + Zeload
# Total Impedance of output Filter
Zfilter := vectorize(Zp*Zlload)/(Zp + Zlload)
# POLYCAP NODE OUTPUT TRANSFER FUNCTION
Hpol := Io_nom*Zfilter/(1 V)
# OUTPUT TRANSFER FUNCTION
Hout := vectorize(Hpol*Zeload)/Zlload
Houtmag := sqrt(Re(Hout)^2 + Im(Hout)^2)
Houtdb := 20*log(Houtmag)
HoutA := 180/π*angle(Re(Hout), Im(Hout)) - 360
# [chart]
    X[1] := f
    X[2] := f
    Y[1] := Houtdb
    Y[2] := HoutA
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# FEEDBACK & COMPENSATION
# SLOW LANE VOLTAGE DIVIDER
Rupper := 110 kΩ
Rlower := 12.8 kΩ  # VR ADJUSTED
Vsense := Vo*Rlower/(Rupper + Rlower) = 2.50163 V
# Make sure this value is 2.5V before
# proceeding
# COMPENSATION NETWORK
Cint := 47 nF
Rint := 62 KΩ
Zint := Rint + 1/(s*Cint)
Hcomp := -vectorize(Hout*Zint)/Rupper
Fzero := 1/(2*π*Rint*Cint) = 54.6173 Hz  # SHOULD MATCH/NEAR THE 1st Stage Filter Resonant Frequency
# FAST LANE
# TYPICAL LIFE OF LED is 10 years at 50%CTR,10mA initial LED current.
Vled := 1.2 V
CTR := 0.35*1.95
Vzener := 0 V
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# SET TARGET COMPENSATION VOLTAGE BETWEEN Vo and Vo/2
Vcomp_fresh := Vo - 1.6 V - Vzener = 22.4 V  # (can be increased to lessen standby loss in 48V output)
Vcomp_old := 0.986*Vcomp_fresh = 22.0864 V
# SET IC CTRL LEVEL NEAR MIDDLE OF 0.77V and 4.9V see LTA1201R specs.
Vfbctrl := 3 V
# SET END OF LIFE OF OPTOCOUPLER
EOLopto := 0.5
Vcbias := 7 V
Rcbias := 13.2 KΩ
Ifbctrl := (Vcbias - Vfbctrl)/Rcbias + 29 μA = 0.33203 mA
Loss := Vcbias*Ifbctrl = 0.00232421 W
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Iled_fresh := Ifbctrl/CTR = 0.486491 mA
Iled_old := Ifbctrl/(EOLopto*CTR) = 0.972983 mA
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# LTV-1008-G
# COMPUTE LED BIAS RESISTORS
Rled := (Vcomp_fresh - Vcomp_old)/(Iled_old - Iled_fresh) = 644.616 Ω
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Rb := Rled*Vled/(Vo - Vzener - Vled - Vcomp_fresh - Iled_fresh*Rled) = 8953 Ω
Icomp_fresh := Iled_fresh + Vled/Rb = 0.620525 mA
Loss_comp := Vo*Icomp_fresh = 0.0148926 W
Icomp_old := Iled_old + Vled/Rb = 1.10702 mA
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# COMPUTE INTERNAL CAPACITANCE OF OPTO (LTV-1008)
Fopto_cutoff := 130 KHz
Copto := 1/(2*π*Rcbias*Fopto_cutoff) = 0.0927476 nF
# OPTO EXTERNAL CAPACITANCE FOR ADDITIONAL POLE COMPENSATION
Copto2 := 47 nF
# TOTAL OPTO CAPACITOR IMPEDANCE
Zcapopto := 1/(s*(Copto + Copto2))
Hled := (Hpol - Hcomp)/Rled
Hfbctrl := vectorize(-Rcbias*Hled*CTR*Zcapopto)/(Zcapopto + Rcbias)
# CLOSED LOOP FAST LANE FREQUENCY ANALYSIS
# Current on LED
# Voltage on FBCTRL
# OUTPUT
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Hled := 1/Rled
Hfbctrl := -Hled*CTR/(1/Rcbias + 1/Zcapopto)
Houtfast := vectorize(Hfbctrl*Hout)
# CLOSED LOOP SLOW LANE ANALYSIS
# COMP TF | Current on LED | Voltage on FBCTRL
Hcomp := -Zint/Rupper
Hled := -Hcomp/Rled
Hfbctrl := -Hled*CTR/(1/Rcbias + 1/Zcapopto)
# OUTPUT
Houtslow := vectorize(Hfbctrl*Hout)
# SYSTEM BODE PLOT (SUPERIMPOSED)
Hbode := Houtfast + Houtslow
Re := Re(Hbode)
Im := Im(Hbode)
Hbodemag := sqrt(Re^2 + Im^2)
A := atan(Im/Re)
Hbodedb := 20*log(Hbodemag)
HbodeA[index] := 180/π*if((Re[index] < 0) and (Im[index] < 0), A[index] - π, A[index])
HbodeA'[index] := if((Re[index] < 0) and (Im[index] > 0), (A[index] + π)*180/π, HbodeA[index])  # SPICE BODE PLOT VERIFICATION (SUPERIMPOSED IN EXCEL)
# [chart]
    X[1] := f
    X[2] := f
    Y[1] := Hbodedb
    Y[2] := HbodeA'
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TOL := 1
# Increase the tolerance if Xindex returns nothing,
# decrease if it returns 2 or more
Xindex := match(0, Hbodedb) = [56]
||Xindex|| = 56
# CROSSOVER FREQUENCY | PHASE MARGIN [°]
Fx := f(||Xindex||) = 2.88255 kHz
θx := 180 + HbodeA'(||Xindex||) = 190.385
