# 48V output
# GUIDE TO THIS FILE:
# 1. Blue - Your input parameter options
# 2. Red - Important results
# 1st Stage Cap: Rubycon 63PZH100M10X15 63V 100uF 2.4A 15m 10x15 4000hrs/135℃
# 2nd Stage Cap: Rubycon 63YXG120MEFC8X20 63V 120uF 0.36A  33m 8x20 4000hrs/105℃
# What is the primary peak current
Vbulk_min := 300 V
Lp_gapped := 320.6 μH
Io_nom := 2.083 A
Vo := 48 V
Vf := 0.7 V
N := 1.75
Po := 100 W
Cpol := 100 μF
ESR := 15*10^-3 Ω
Lout := 3.7 μH
Celec := 120 μF
ESR2 := 330*10^-3 Ω
Eff := 0.95
Tvalley := 1.1 μs
Lsec := Lp_gapped/N^2 = 104.686 μH
F1 := 1/(2*π*(Vo/Io_nom)*Cpol) = 69.0666 Hz  # 1st Stage Filter Resonant Frequency
F2 := 1/(2*π*sqrt(Lout*Celec)) = 7.55316 kHz  # 2nd Stage Filter Resonant Frequency
a := N*Vbulk_min*Lp_gapped = 0.168315 kg^2*m^4/(s^5*A^3)
b := -2*Io_nom*Lp_gapped*(N*(Vo + Vf) + Vbulk_min) = -0.514514 kg^2*m^4/(s^5*A^2)
c := -2*Io_nom*1*Tvalley*N*Vbulk_min*(Vo + Vf) = -0.117166 kg^2*m^4/(s^5*A)
Ipk_max := (-b + sqrt((b^2 - 4*a*c)))/(2*a) = 3.26975 A
Ipk_secondary := Ipk_max*N = 5.72206 A
Fsw := Po*2/(Lp_gapped*Ipk_max^2*Eff) = 61.4207 kHz  # SWITCHING FREQUENCY
# What is Fsw in the simulation result? 62 KHz
Ton := Ipk_max*Lp_gapped/Vbulk_min = 3.49427 μs
Toff := 1/Fsw - Ton = 12.7869 μs
Tsec_pk := Ipk_secondary*Lp_gapped/(N^2*(Vo + Vf)) = 12.3002 μs
Dsec := Tsec_pk*Fsw = 0.755484
Isec_rms := Ipk_secondary*sqrt(Dsec/3) = 2.87147 A  # FORMULA REFERENCE: Vishay AN730
Ipol_rms := sqrt(Isec_rms^2 - Io_nom^2) = 1.97647 A  # 1st stage RIPPLE CURRENT
# What is the 2st stage capacitor ripple current in the simulation result? 1.88A
Vpoly_ripple := Ipk_secondary*sqrt(ESR^2 + (1/(2*π*Fsw*Cpol))^2) = 171.322 mV
w := 2*π*Fsw
Rl := Vo/Io_nom = 23.0437 Ω
Mag_upper := sqrt(1 + (w*ESR2*Celec)^2) = 15.315
Real_lower := Rl - w^2*Lout*Celec*(Rl + ESR2) = -1522.57 Ω
Imag_lower := w*(ESR*Rl*Celec + Lout) = 17.4352 Ω
Mag_lower := sqrt(Real_lower^2 + Imag_lower^2) = 1522.66 Ω
Vout_ripple := Vpoly_ripple*Rl*Mag_upper/Mag_lower = 39.7081 mV  # OUTPUT RIPPLE VOLTAGE
# What is the output ripple specification? 340mV
# What is the voltage output ripple in the simulation result? 17.8mV
# OUTPUT FILTER TRANSFER FUNCTION
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ORIGIN := 1
index := 1 .. 100
f[index] := 1 Hz*1.15^index
s := 1j*2*π*f
# POLYCAP Impedance | INDUCTOR Impedance | ECAP Impedance
Zp := ESR + 1/(s*Cpol)
Zl := s*Lout
Ze := ESR2 + 1/(s*Celec)
# Combined Impedance of ECAP and Load
Zeload := Ze*(Vo/Io_nom)/(Ze + Vo/Io_nom)
# Series Impedance from inductor to load
Zlload := Zl + Zeload
# Total Impedance of output Filter
Zfilter := vectorize(Zp*Zlload)/(Zp + Zlload)
# POLYCAP NODE OUTPUT TRANSFER FUNCTION
Hpol := Io_nom*Zfilter/(1 V)
Hpolmag := sqrt(Re(Hpol)^2 + Im(Hpol)^2)
Hpoldb := 20*log(Hpolmag)
HpolA := 180/π*arg(Hpol)
# [chart]
    X[1] := f
    X[2] := f
    Y[1] := Hpoldb
    Y[2] := HpolA
# OUTPUT TRANSFER FUNCTION
Hout := vectorize(Hpol*Zeload)/Zlload
Houtmag := sqrt(Re(Hout)^2 + Im(Hout)^2)
Houtdb := 20*log(Houtmag)
HoutA := 180/π*angle(Re(Hout), Im(Hout)) - 360
# [chart]
    X[1] := f
    X[2] := f
    Y[1] := Houtdb
    Y[2] := HoutA
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# FEEDBACK & COMPENSATION
# SLOW LANE VOLTAGE DIVIDER
Rupper := 200 kΩ
Rlower := 11 kΩ  # VR ADJUSTED
Vsense := Vo*Rlower/(Rupper + Rlower) = 2.50237 V
# Make sure this value is 2.5V before
# proceeding
# COMPENSATION NETWORK
Cint := 0.022 μF
Rint := 82 KΩ
Zint := Rint + 1/(s*Cint)
Hcomp := -vectorize(Hout*Zint)/Rupper
Fzero := 1/(2*π*Rint*Cint) = 88.2234 Hz  # SHOULD MATCH/NEAR THE 1st Stage Filter Resonant Frequency
# FAST LANE
# TYPICAL LIFE OF LED is 10 years at 50%CTR,10mA initial LED current.
Vled := 1.2 V
CTR := 0.35*1.95
Vzener := 20 V
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# SET TARGET COMPENSATION VOLTAGE BETWEEN Vo and Vo/2
Vcomp_fresh := Vo - 1.6 V - Vzener = 26.4 V  # (can be increased to lessen standby loss in 48V output)
Vcomp_old := 0.986*Vcomp_fresh = 26.0304 V
# SET IC CTRL LEVEL NEAR MIDDLE OF 0.77V and 4.9V see LTA1201R specs.
Vfbctrl := 3 V
# SET END OF LIFE OF OPTOCOUPLER
EOLopto := 0.5
Vcbias := 7 V
Rcbias := 13.2 KΩ
Ifbctrl := (Vcbias - Vfbctrl)/Rcbias + 29 μA = 0.33203 mA
Loss := Vcbias*Ifbctrl = 0.00232421 W
Iled_fresh := Ifbctrl/CTR = 0.486491 mA
Iled_old := Ifbctrl/(EOLopto*CTR) = 0.972983 mA
# COMPUTE LED BIAS RESISTORS
Rled := (Vcomp_fresh - Vcomp_old)/(Iled_old - Iled_fresh) = 759.726 Ω
Rb := Rled*Vled/(Vo - Vzener - Vled - Vcomp_fresh - Iled_fresh*Rled) = 29989.2 Ω
Icomp_fresh := Iled_fresh + Vled/Rb = 0.526506 mA
Loss_comp := Vo*Icomp_fresh = 0.0252723 W
Icomp_old := Iled_old + Vled/Rb = 1.013 mA
# LTV-1008-G
# COMPUTE INTERNAL CAPACITANCE OF OPTO (LTV-1008)
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Fopto_cutoff := 130 KHz
Copto := 1/(2*π*Rcbias*Fopto_cutoff) = 0.0927476 nF
# OPTO EXTERNAL CAPACITANCE FOR ADDITIONAL POLE COMPENSATION
Copto2 := 47 nF
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# TOTAL OPTO CAPACITOR IMPEDANCE
Zcapopto := 1/(s*(Copto + Copto2))
Hled := (Hpol - Hcomp)/Rled
Hfbctrl := vectorize(-Rcbias*Hled*CTR*Zcapopto)/(Zcapopto + Rcbias)
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# CLOSED LOOP FAST LANE TRANSFER FUNCTION
# Current on LED | Voltage on FBCTRL | OUTPUT
Hled := 1/Rled
Hfbctrl := -Hled*CTR/(1/Rcbias + 1/Zcapopto)
Houtfast := vectorize(Hfbctrl*Hout)
# CLOSED LOOP SLOW LANE TRANSFER FUNCTION
# COMP TF
# Current on LED
# Voltage on FBCTRL
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Hcomp := -Zint/Rupper
Hled := -Hcomp/Rled
Hfbctrl := -Hled*CTR/(1/Rcbias + 1/Zcapopto)
# OUTPUT
Houtslow := vectorize(Hfbctrl*Hout)
# CLOSED LOOP FINAL BODE PLOT (SUPERIMPOSED)
Hbode := Houtfast + Houtslow
Hbodemag := sqrt(Re(Hbode)^2 + Im(Hbode)^2)
Hbodedb := 20*log(Hbodemag)
HbodeA[index] := 180/π*if(Re(Hbode[index]) < 0, atan(Im(Hbode[index])/Re(Hbode[index])) + π, atan(Im(Hbode[index])/Re(Hbode[index])))
# LTSPICE AC ANALYSIS VERIFICATION (SUPERIMPOSED IN EXCEL)
# [chart]
    X[1] := f
    X[2] := f
    Y[1] := Hbodedb
    Y[2] := HbodeA
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TOL := 1.1
# Increase the tolerance if the Xindex returns nothing.
# Decrease if it returns more than 1 value.
Xindex := match(0, Hbodedb) = [57]
||Xindex|| = 57
# CROSSOVER FREQUENCY | PHASE MARGIN [°]
Fx := f(||Xindex||) = 3.31493 kHz
θx := 180 + HbodeA(||Xindex||) = 202.595
