# HIGH SIDE CURRENT SENSE LEVEL SHIFTER
# Current at MOSFET Q6
Iq6 := 0 mA  # <---Assign the Q6 arbitrary current here
# Current Sense Resistors
R59 := 1 Ω
R74 := R59
Rsense := R59*R74/(R59 + R74) = 0.5 Ω
# Power Loss at Current Sense Resistors
Psense_loss := Iq6^2*Rsense = 0 W
# Bias Resistors | Level shifter resistors
R97 := 150 Ω
R102 := 10 kΩ
R52 := 100 Ω
R98 := 330 Ω
# Voltage at ISENSEH net
Visenseh := 5 V - Iq6*Rsense = 5 V
# Voltage at ISENSEH_BIASED
Visenseh_biased := Visenseh*R102/(R102 + R97) = 4.92611 V
# Current at MOSFET Q1
Iq1 := (5 V - Visenseh_biased)/R52 = 0.738916 mA
# Voltage at RA3_ISENSEH
Vra3_isenseh := Iq1*R98 = 0.243842 V
# Power Loss at Level Shifter Resistors
Plevelr_loss := Iq1^2*(R52 + R98) = 0.234779 mW
# Power Loss at MOSFET Q1
Pq1_loss := Iq1*(Visenseh_biased - Vra3_isenseh) = 3.4598 mW
